<?xml version="1.0"?>
<?xml-stylesheet type="text/xsl" href="/JSBSim.xsl"?>
<fdm_config name="swift" version="2.0" release="DEVELOPMENT"
   xmlns:xsi="http://www.w3.org/2001/XMLSchema-instance"
   xsi:noNamespaceSchemaLocation="http://jsbsim.sourceforge.net/JSBSim.xsd">

    <fileheader>
        <author>Richard Harrison</author>
        <filecreationdate>2019-09-16</filecreationdate>
        <version>1.0</version>
        <copyright>Copyright (C) 2016 Richard Harrison, All rights reserved</copyright>
        <description></description>
        <note>
        Supermarine swift
    </note>
        <note>Built with AeroTool 1.0.0.0: Options: AeroDetail=Full, WakeIterations=2</note>
        <limitation></limitation>
        <reference
            refID="ZDAT/AED/2019/09-09"
            author="Richard Harrison, rjh@zaretto.com"
            title="swift Aerodynamic data built from vspaero; CG (5.4, 0, 0.342)M"
            date="09 Sep 2019"
            URL="http://www.zaretto.com/sites/zaretto.com/files/swift-data/rjh-zaretto-swift-aerodynamic-data-vspaero.pdf"
        />
    </fileheader>
<metrics>
  <wingarea unit="M2">21.404</wingarea>
  <wing_incidence>0</wing_incidence>
  <wingspan unit="M">7.971</wingspan>
  <chord unit="M">2.589</chord>
  <location unit="M" name="EYEPOINT">
    <x>-6.116</x>
    <y>0</y>
    <z>0.2254</z>
  </location>
  <location unit="M" name="VRP">
    <x>-6.116</x>
    <y>0</y>
    <z>0.2254</z>
  </location>
  <location unit="M" name="AERORP">
    <x>5.6</x>
    <y>0</y>
    <z>0.342</z>
  </location>
</metrics>

<mass_balance>
  <location unit="M" name="CG">
    <x>5.4</x>
    <y>0</y>
    <z>0.342</z>
  </location>
  <ixx unit="SLUG*FT2">14382.5</ixx>
  <iyy unit="SLUG*FT2">62830.1</iyy>
  <izz unit="SLUG*FT2">74666.9</izz>
  <ixz unit="SLUG*FT2">413.2</ixz>
  <emptywt unit="LBS">13758</emptywt>
</mass_balance>

<ground_reactions>
  <contact type="BOGEY" name="NoseGear">
    <location unit="M">
      <x>2.26</x>
      <y>0</y>
      <z>-1.7424</z>
    </location>
    <static_friction>1.0</static_friction>
    <dynamic_friction>0.5</dynamic_friction>
    <rolling_friction>0.02</rolling_friction>
    <spring_coeff>12001</spring_coeff>
    <damping_coeff unit="LBS/FT/SEC">601</damping_coeff>
    <max_steer>12.5</max_steer>
    <!--0: NoseGear-->
    <brake_group>NOSE</brake_group>
    <retractable>1</retractable>
  </contact>
  <contact type="BOGEY" name="LeftMainGear">
    <location unit="M">
      <x>6.23</x>
      <y>-2.47</y>
      <z>-1.662</z>
    </location>
    <static_friction>1.0</static_friction>
    <dynamic_friction>0.5</dynamic_friction>
    <rolling_friction>0.02</rolling_friction>
    <spring_coeff>12001</spring_coeff>
    <damping_coeff unit="LBS/FT/SEC">601</damping_coeff>
    <!--1: LeftMainGear-->
    <brake_group>LEFT</brake_group>
    <retractable>1</retractable>
  </contact>
  <contact type="BOGEY" name="RightMainGear">
    <location unit="M">
      <x>6.23</x>
      <y>2.47</y>
      <z>-1.662</z>
    </location>
    <static_friction>1.0</static_friction>
    <dynamic_friction>0.5</dynamic_friction>
    <rolling_friction>0.02</rolling_friction>
    <spring_coeff>12001</spring_coeff>
    <damping_coeff unit="LBS/FT/SEC">601</damping_coeff>
    <!--2: RightMainGear-->
    <brake_group>RIGHT</brake_group>
    <retractable>1</retractable>
  </contact>
</ground_reactions>

<propulsion>
  <engine file="RR-AVON-114">
    <location unit="M">
      <x>12</x>
      <y>0</y>
      <z>0</z>
    </location>
    <orient unit="DEG">
      <roll>0</roll>
      <pitch>0</pitch>
      <yaw>0</yaw>
    </orient>
    <feed>0</feed>
    <feed>1</feed>
    <feed>2</feed>
    <feed>3</feed>
    <feed>4</feed>
    <thruster file="direct">
      <location unit="M">
        <x>12</x>
        <y>0</y>
        <z>0</z>
      </location>
      <orient unit="DEG">
        <roll>0</roll>
        <pitch>0</pitch>
        <yaw>0</yaw>
      </orient>
    </thruster>
  </engine>
  <tank number="0" type="FUEL">
    <!--0: RightWing-->
    <location unit="M">
      <x>5.92</x>
      <y>1.59</y>
      <z>-0.031</z>
    </location>
    <capacity unit="LBS">739</capacity>
    <standpipe unit="LBS">10</standpipe>
    <contents unit="LBS">739</contents>
    <priority>1</priority>
  </tank>
  <tank number="1" type="FUEL">
    <!--1: LeftWing-->
    <location unit="M">
      <x>5.92</x>
      <y>-1.59</y>
      <z>-0.031</z>
    </location>
    <capacity unit="LBS">739</capacity>
    <standpipe unit="LBS">10</standpipe>
    <contents unit="LBS">739</contents>
    <priority>1</priority>
  </tank>
  <tank number="2" type="FUEL">
    <!--2: RearTank-->
    <location unit="M">
      <x>6.53</x>
      <y>0</y>
      <z>-0.031</z>
    </location>
    <capacity unit="LBS">801</capacity>
    <standpipe unit="LBS">10</standpipe>
    <contents unit="LBS">801</contents>
    <priority>2</priority>
  </tank>
  <tank number="3" type="FUEL">
    <!--3: CenterTank-->
    <location unit="M">
      <x>5.6435</x>
      <y>0</y>
      <z>-0.031</z>
    </location>
    <capacity unit="LBS">755</capacity>
    <standpipe unit="LBS">10</standpipe>
    <contents unit="LBS">755</contents>
    <priority>4</priority>
  </tank>
  <tank number="4" type="FUEL">
    <!--4: FrontTank-->
    <location unit="M">
      <x>4.77</x>
      <y>0</y>
      <z>-0.031</z>
    </location>
    <capacity unit="LBS">862</capacity>
    <standpipe unit="LBS">10</standpipe>
    <contents unit="LBS">862</contents>
    <priority>3</priority>
  </tank>
</propulsion>

<external_reactions />

<flight_control name="swift-FCS">
  <channel name="extra-aero">
        <!-- need %Cg in chord for moments [Xcg - Xref)/100] -->
        <summer name="cg-x-offset-chord-in">
            <input> inertia/cg-x-in</input>
            <input> -metrics/aero-rp-x-in</input>
            <output>inertia/cg-x-offset-chord-in</output>
        </summer>

        <!-- figure out the factor for the fuel tank aero -->
        <pure_gain name="cg-x-chord-percent">
            <description>Percent offset of the CoP from the CG</description>
            <input>inertia/cg-x-offset-chord-in</input>
            <gain> -0.01</gain>
            <clipto>
                <min> -1 </min>
                <max> 1 </max>
            </clipto>
            <output> inertia/cg-x-mac-percent </output>
        </pure_gain>

        <fcs_function name="pb">
            <description>PB Denormalization</description>
            <function>
                    <product>
                        <property>aero/bi2vel</property>
                        <property>velocities/p-aero-rad_sec</property>
                    </product>
            </function>
            <output>aero/pb</output>
        </fcs_function>

        <fcs_function name="cbarq-2vo">
            <description>For denormalization</description>
            <function>
                    <product>
                        <property>aero/ci2vel</property>
                        <property>velocities/q-aero-rad_sec</property>
                    </product>
            </function>
            <output>aero/qb</output>
        </fcs_function>

        <fcs_function name="rb-2vo">
            <description>For denormalization</description>
            <function>
                <product>
                        <property>aero/bi2vel</property>
                        <property>velocities/r-aero-rad_sec</property>
                    </product>
            </function>
            <output>aero/rb</output>
        </fcs_function>


        <fcs_function name="aero-cos-alpha">
            <function>
                <cos>
                    <property>aero/alpha-rad</property>
                </cos>
            </function>
            <output>aero/cos-alpha</output>
        </fcs_function>

        <fcs_function name="aero-sin-alpha">
            <function>
                <sin>
                    <property>aero/alpha-rad</property>
                </sin>
            </function>
            <output>aero/sin-alpha</output>
        </fcs_function>
       </channel>
</flight_control>
<system file="swift-flight-controls"/>
<system file="swift-hydraulics"/>
<system file="swift-engines"/>
<system file="swift-ecs"/>
<system file="swift-electrics"/>
<aerodynamics>
    <function name="aero/coefficients/CFXB">
    <description>BASE DRAG</description>
          <table>
            <independentVar lookup="row">aero/alpha-deg</independentVar>
            <independentVar lookup="column">aero/beta-deg</independentVar>
            <tableData>
                                -20	        -10	         -5	         -2	          0	          2	          5	         10	         20
                    -20	0.12311000	0.12898000	0.12733000	0.12765000	0.12790000	0.12765000	0.12733000	0.12898000	0.12310000
                    -10	0.06099000	0.05863000	0.05638000	0.05591000	0.05588000	0.05591000	0.05638000	0.05863000	0.06099000
                     -8	0.05062000	0.04683000	0.04436000	0.04374000	0.04370000	0.04374000	0.04436000	0.04684000	0.05062000
                     -6	0.04349000	0.03805000	0.03563000	0.03474000	0.03459000	0.03474000	0.03563000	0.03805000	0.04349000
                     -4	0.03865000	0.03222000	0.02947000	0.02880000	0.02872000	0.02880000	0.02947000	0.03222000	0.03865000
                     -2	0.03617000	0.02927000	0.02652000	0.02577000	0.02567000	0.02577000	0.02652000	0.02927000	0.03617000
                      0	0.03642000	0.02896000	0.02640000	0.02572000	0.02555000	0.02572000	0.02640000	0.02896000	0.03642000
                      2	0.03899000	0.03139000	0.02921000	0.02867000	0.02861000	0.02867000	0.02921000	0.03139000	0.03899000
                      4	0.04443000	0.03702000	0.03508000	0.03482000	0.03479000	0.03482000	0.03508000	0.03702000	0.04443000
                      6	0.05163000	0.04464000	0.04434000	0.04380000	0.04384000	0.04380000	0.04434000	0.04464000	0.05163000
                      8	0.06133000	0.05514000	0.05486000	0.05563000	0.05595000	0.05563000	0.05486000	0.05514000	0.06133000
                     10	0.07092000	0.06834000	0.06914000	0.06990000	0.07038000	0.06990000	0.06914000	0.06834000	0.07092000
                     12	0.08418000	0.07846000	0.08307000	0.08523000	0.08609000	0.08523000	0.08307000	0.07846000	0.08418000
                     14	0.09752000	0.09436000	0.09584000	0.10143000	0.10204000	0.10143000	0.09584000	0.09436000	0.09752000
                     16	0.11050000	0.10593000	0.11038000	0.11668000	0.11287000	0.11663000	0.11038000	0.10593000	0.11050000
                     18	0.11788000	0.11943000	0.12402000	0.12824000	0.12768000	0.12824000	0.12402000	0.11943000	0.11788000
                     20	0.12737000	0.12911000	0.13616000	0.13917000	0.13919000	0.13917000	0.13616000	0.12911000	0.12737000
                     22	0.13866000	0.13852000	0.14598000	0.14812000	0.14766000	0.14812000	0.14598000	0.13852000	0.13866000
                     24	0.14851000	0.14691000	0.15407000	0.15480000	0.15468000	0.15480000	0.15407000	0.14691000	0.14851000
                     26	0.15989000	0.14945000	0.15905000	0.15996000	0.16042000	0.15996000	0.15905000	0.14945000	0.15989000
                     28	0.16618000	0.14894000	0.16263000	0.16630000	0.16556000	0.16631000	0.16263000	0.14894000	0.16618000
                     30	0.17834000	0.15076000	0.16966000	0.17012000	0.16805000	0.17012000	0.16966000	0.15076000	0.17834000
                     35	0.19701000	0.16912000	0.18204000	0.18451000	0.18613000	0.18451000	0.18204000	0.16912000	0.19701000
                     45	0.17876000	0.19478000	0.20195000	0.20150000	0.20376000	0.20150000	0.20195000	0.19478000	0.17876000
                     50	0.21449000	0.23316000	0.23590000	0.24141000	0.24231000	0.24142000	0.23590000	0.23316000	0.21449000
                     55	0.21731000	0.22171000	0.22123000	0.22334000	0.22423000	0.22334000	0.22123000	0.22171000	0.21735000
                     60	0.21725000	0.22079000	0.21948000	0.20995000	0.21542000	0.20995000	0.21948000	0.22079000	0.21725000
            </tableData>
          </table>
    </function>
    <function name="aero/coefficients/CFXDAD">
    <description>DRAG INCREMENT DUE TO AILERON DEFLECTION</description>
    <product>
          <property>fcs/aileron-pos-deg</property>
          <table>
            <independentVar lookup="row">aero/alpha-deg</independentVar>
            <independentVar lookup="column">aero/beta-deg</independentVar>
            <tableData>
                                -20	        -10	         -5	         -2	          0	          2	          5	         10	         20
                    -20	-0.00085050	-0.00074900	-0.00073950	-0.00074150	-0.00073450	-0.00072650	-0.00071100	-0.00071500	-0.00065450
                    -10	-0.00074200	-0.00095800	-0.00104400	-0.00109900	-0.00112750	-0.00114650	-0.00115450	-0.00112400	-0.00099500
                     -8	-0.00068350	-0.00084400	-0.00090900	-0.00095950	-0.00102850	-0.00107250	-0.00108600	-0.00108150	-0.00100250
                     -6	-0.00059700	-0.00072050	-0.00076050	-0.00079050	-0.00085900	-0.00091750	-0.00092700	-0.00091800	-0.00093050
                     -4	-0.00045750	-0.00056500	-0.00060250	-0.00061700	-0.00067100	-0.00073750	-0.00074550	-0.00075900	-0.00076250
                     -2	-0.00028400	-0.00041000	-0.00044450	-0.00046250	-0.00047350	-0.00056000	-0.00056000	-0.00056450	-0.00057400
                      0	-0.00012950	-0.00027100	-0.00029500	-0.00029950	-0.00030400	-0.00035050	-0.00037100	-0.00038800	-0.00039450
                      2	-0.00000300	-0.00011800	-0.00012450	-0.00013100	-0.00012850	-0.00014950	-0.00017250	-0.00019450	-0.00021100
                      4	0.00010600	0.00004200	0.00004450	0.00004900	0.00005250	0.00005350	0.00003250	-0.00000550	0.00001050
                      6	0.00021000	0.00019300	0.00021750	0.00023300	0.00024350	0.00024900	0.00024700	0.00019250	0.00017450
                      8	0.00030850	0.00034400	0.00038550	0.00042750	0.00043950	0.00045200	0.00043950	0.00039350	0.00035850
                     10	0.00038650	0.00046600	0.00055900	0.00060600	0.00062500	0.00064900	0.00065250	0.00057800	0.00052500
                     12	0.00046200	0.00060450	0.00068900	0.00074450	0.00076900	0.00079150	0.00079200	0.00075250	0.00062250
                     14	0.00054400	0.00071200	0.00077400	0.00084950	0.00085100	0.00087600	0.00084700	0.00078400	0.00066950
                     16	0.00062250	0.00075300	0.00080350	0.00082700	0.00079800	0.00081700	0.00079750	0.00069750	0.00055350
                     18	0.00069950	0.00073550	0.00070000	0.00070250	0.00066900	0.00072250	0.00073400	0.00064150	0.00045550
                     20	0.00072900	0.00065500	0.00064550	0.00062850	0.00064250	0.00066750	0.00069900	0.00058750	0.00050700
                     22	0.00068550	0.00064500	0.00062100	0.00059400	0.00058500	0.00061500	0.00066700	0.00058300	0.00046450
                     24	0.00062500	0.00061700	0.00058600	0.00061300	0.00063850	0.00058350	0.00059350	0.00057600	0.00051650
                     26	0.00055000	0.00057300	0.00057100	0.00055500	0.00056250	0.00053100	0.00056350	0.00053350	0.00050550
                     28	0.00052700	0.00052200	0.00053450	0.00056100	0.00059000	0.00053450	0.00049650	0.00040200	0.00050950
                     30	0.00046200	0.00048950	0.00053300	0.00053550	0.00049050	0.00051450	0.00047050	0.00041150	0.00051250
                     35	0.00041500	0.00043850	0.00044150	0.00044850	0.00046000	0.00044600	0.00048300	0.00042800	0.00053600
                     45	0.00035250	0.00042700	0.00039150	0.00037600	0.00038850	0.00043750	0.00039450	0.00047550	0.00033250
                     50	0.00029400	0.00033300	0.00037450	0.00038250	0.00040600	0.00041700	0.00043050	0.00043700	0.00043150
                     55	0.00027300	0.00030700	0.00031050	0.00035000	0.00035850	0.00034350	0.00038100	0.00037300	0.00041050
                     60	0.00028300	0.00045700	0.00049750	0.00041800	0.00046450	0.00045600	0.00054100	0.00062850	0.00041650
            </tableData>
          </table>
       </product>
    </function>
    <function name="aero/coefficients/CFXDADMN">
    <description>DRAG CHANGE DUE TO MACH DUE TO AILERON DEFLECTION</description>
    <product>
          <property>fcs/aileron-pos-deg</property>
          <table>
            <independentVar lookup="row">velocities/mach</independentVar>
            <independentVar lookup="column">aero/alpha-deg</independentVar>
            <tableData>
                                -10	         -5	         -2	       0.01	          1	          2	          6	          7	         10
                    0.2	0.00071550	0.00029100	0.00013700	0.00009000	0.00008150	0.00008150	0.00017950	0.00023350	0.00044650
                    0.4	0.00046350	0.00019400	0.00009150	0.00006050	0.00005450	0.00005450	0.00011850	0.00015450	0.00029700
                    0.6	0.00000000	0.00000000	0.00000000	0.00000000	0.00000000	0.00000000	0.00000000	0.00000000	0.00000000
                    0.8	-0.00069900	-0.00034400	-0.00017050	-0.00011500	-0.00010250	-0.00010100	-0.00019350	-0.00024500	-0.00045400
                    0.9	-0.00107750	-0.00057450	-0.00030350	-0.00020750	-0.00018450	-0.00018100	-0.00030550	-0.00037350	-0.00066450
                   0.97	-0.00133250	-0.00083350	-0.00046450	-0.00032000	-0.00028500	-0.00027750	-0.00039550	-0.00046200	-0.00080650
                   0.98	-0.00131000	-0.00088100	-0.00050000	-0.00034500	-0.00030700	-0.00029700	-0.00039500	-0.00045450	-0.00080550
                   0.99	-0.00116900	-0.00093500	-0.00055150	-0.00038200	-0.00033700	-0.00032250	-0.00036350	-0.00039500	-0.00074100
                    1.4	-0.00365200	-0.00149050	-0.00071650	-0.00061400	-0.00075900	-0.00099350	-0.00265600	-0.00319400	-0.00518150
            </tableData>
          </table>
       </product>
    </function>
    <function name="aero/coefficients/CFXDRD">
    <description>DRAG INCREMENT DUE TO RUDDER DEFLECTION</description>
    <product>
          <property>fcs/rudder-pos-deg</property>
          <table>
            <independentVar lookup="row">aero/alpha-deg</independentVar>
            <independentVar lookup="column">aero/beta-deg</independentVar>
            <tableData>
                                -20	        -10	         -5	         -2	          0	          2	          5	         10	         20
                    -20	-0.00041100	-0.00045850	-0.00039200	-0.00029300	-0.00023850	-0.00014100	-0.00002000	0.00022750	0.00041150
                    -10	-0.00032950	-0.00047250	-0.00035800	-0.00025450	-0.00020550	-0.00012250	-0.00000750	0.00019350	0.00034350
                     -8	-0.00032800	-0.00046900	-0.00034550	-0.00025250	-0.00020100	-0.00011850	-0.00000350	0.00019250	0.00033700
                     -6	-0.00033450	-0.00047050	-0.00032800	-0.00023550	-0.00017300	-0.00010250	0.00000050	0.00018900	0.00033750
                     -4	-0.00034850	-0.00044100	-0.00030700	-0.00022350	-0.00016150	-0.00009650	0.00000100	0.00017150	0.00034150
                     -2	-0.00036500	-0.00042800	-0.00029500	-0.00021700	-0.00015300	-0.00009000	0.00000250	0.00016600	0.00035050
                      0	-0.00036950	-0.00041050	-0.00028500	-0.00017550	-0.00011900	-0.00006600	0.00000400	0.00015700	0.00035000
                      2	-0.00036900	-0.00038600	-0.00025700	-0.00017800	-0.00012700	-0.00007700	0.00000550	0.00014850	0.00034500
                      4	-0.00037200	-0.00035750	-0.00023350	-0.00016600	-0.00012050	-0.00007150	0.00000250	0.00013700	0.00034500
                      6	-0.00038150	-0.00033100	-0.00021750	-0.00016000	-0.00011450	-0.00006950	-0.00000350	0.00013000	0.00034800
                      8	-0.00040250	-0.00031350	-0.00018900	-0.00013750	-0.00011050	-0.00007450	-0.00001200	0.00013800	0.00037000
                     10	-0.00039550	-0.00026900	-0.00015150	-0.00011700	-0.00010000	-0.00008050	-0.00002350	0.00010150	0.00036300
                     12	-0.00041350	-0.00027200	-0.00015100	-0.00010400	-0.00009350	-0.00008450	-0.00003500	0.00012700	0.00038400
                     14	-0.00044900	-0.00023250	-0.00009900	-0.00008750	-0.00008950	-0.00007750	-0.00007100	0.00014150	0.00043700
                     16	-0.00041750	-0.00016850	-0.00008900	-0.00008400	-0.00009100	-0.00007200	-0.00005850	0.00009050	0.00042850
                     18	-0.00037200	-0.00015550	-0.00007450	-0.00007700	-0.00007900	-0.00006200	-0.00004750	0.00012350	0.00035400
                     20	-0.00031400	-0.00023250	-0.00010050	-0.00006750	-0.00005950	-0.00004700	-0.00001450	0.00017350	0.00030700
                     22	-0.00026600	-0.00015650	-0.00007550	-0.00007450	-0.00005050	-0.00001550	-0.00000650	0.00011350	0.00026800
                     24	-0.00021900	-0.00007450	-0.00006900	-0.00007100	-0.00004400	-0.00002100	0.00000750	0.00006050	0.00021700
                     26	-0.00017150	0.00000050	-0.00004250	-0.00006400	-0.00003700	-0.00001900	-0.00000700	-0.00005450	0.00018650
                     28	-0.00013550	0.00001600	-0.00002050	-0.00004600	-0.00003050	-0.00001550	-0.00002750	-0.00007100	0.00015400
                     30	-0.00011700	-0.00008350	-0.00000200	-0.00003450	-0.00002600	-0.00001350	-0.00003950	-0.00000800	0.00010350
                     35	0.00002000	0.00002100	0.00001000	-0.00001950	-0.00001750	-0.00000800	-0.00001700	-0.00003450	0.00000050
                     45	-0.00000500	0.00000550	-0.00000200	-0.00000750	-0.00000500	0.00000200	0.00000000	-0.00001000	-0.00000700
                     50	-0.00000050	0.00000150	-0.00000100	-0.00000200	0.00000200	0.00000150	0.00000050	-0.00000500	0.00000850
                     55	0.00000550	-0.00000200	0.00000000	0.00000000	0.00000000	-0.00000050	0.00000000	0.00000000	0.00000450
                     60	0.00001200	-0.00000400	-0.00000050	-0.00000100	-0.00000250	-0.00002100	0.00000050	0.00000200	-0.00000350
            </tableData>
          </table>
       </product>
    </function>
    <function name="aero/coefficients/CFXDRDMN">
    <description>DRAG CHANGE DUE TO MACH DUE TO RUDDER DEFLECTION</description>
    <product>
          <property>fcs/rudder-pos-deg</property>
          <table>
            <independentVar lookup="row">velocities/mach</independentVar>
            <independentVar lookup="column">aero/alpha-deg</independentVar>
            <tableData>
                                -10	         -5	         -2	       0.01	          1	          2	          6	          7	         10
                    0.2	0.00047850	0.00012250	0.00004800	0.00003850	0.00005500	0.00007900	0.00028150	0.00036650	0.00065900
                    0.4	0.00031700	0.00008100	0.00003200	0.00002550	0.00003650	0.00005250	0.00018700	0.00024300	0.00043850
                    0.6	0.00000000	0.00000000	0.00000000	0.00000000	0.00000000	0.00000000	0.00000000	0.00000000	0.00000000
                    0.8	-0.00049350	-0.00014250	-0.00005800	-0.00004750	-0.00006650	-0.00009300	-0.00030550	-0.00038600	-0.00066950
                    0.9	-0.00071650	-0.00023800	-0.00010250	-0.00008600	-0.00011850	-0.00016500	-0.00047250	-0.00057900	-0.00096850
                   0.97	-0.00085650	-0.00034250	-0.00015450	-0.00013500	-0.00018250	-0.00024550	-0.00060950	-0.00071700	-0.00119350
                   0.98	-0.00083800	-0.00035900	-0.00016550	-0.00014650	-0.00019650	-0.00026150	-0.00061500	-0.00071200	-0.00118600
                   0.99	-0.00074300	-0.00037150	-0.00017700	-0.00016200	-0.00021300	-0.00028000	-0.00058250	-0.00065050	-0.00108050
                    1.4	-0.00359350	-0.00136400	-0.00049400	-0.00037550	-0.00048200	-0.00073100	-0.00230100	-0.00282700	-0.00480500
            </tableData>
          </table>
       </product>
    </function>
    <function name="aero/coefficients/CFXFLAPS">
    <description>DRAG INCREMENT DUE TO FLAPS</description>
          <table>
            <independentVar lookup="row">aero/alpha-deg</independentVar>
            <independentVar lookup="column">fcs/flap-pos-deg</independentVar>
            <tableData>
                                  0	         45
                    -20	0.00000000	-0.03658000
                    -10	0.00000000	-0.00559000
                     -8	0.00000000	0.00378000
                     -6	0.00000000	0.01422000
                     -4	0.00000000	0.02144000
                     -2	0.00000000	0.03028000
                      0	0.00000000	0.03920000
                      2	0.00000000	0.05042000
                      4	0.00000000	0.05933000
                      6	0.00000000	0.06376000
                      8	0.00000000	0.06772000
                     10	0.00000000	0.07111000
                     12	0.00000000	0.06188000
                     14	0.00000000	0.05811000
                     16	0.00000000	0.05070000
                     18	0.00000000	0.04241000
                     20	0.00000000	0.04173000
                     22	0.00000000	0.04457000
                     24	0.00000000	0.04170000
                     26	0.00000000	0.03967000
                     28	0.00000000	0.03815000
                     30	0.00000000	0.03413000
                     35	0.00000000	0.03281000
                     45	0.00000000	0.02004000
                     50	0.00000000	0.02354000
                     55	0.00000000	0.01881000
                     60	0.00000000	0.01517000
            </tableData>
          </table>
    </function>
    <function name="aero/coefficients/CFXGEAR">
    <description>DRAG INCREMENT DUE TO GEAR</description>
    <product>
          <property>gear/gear-pos-norm</property>
          <table>
            <independentVar lookup="row">aero/alpha-deg</independentVar>
            <independentVar lookup="column">aero/beta-deg</independentVar>
            <tableData>
                                -20	        -10	         -5	         -2	          0	          2	          5	         10	         20
                    -20	0.00869000	0.01192000	0.01192000	0.01154000	0.01141000	0.01154000	0.01191000	0.01193000	0.00871000
                    -10	0.00648000	0.00472000	0.00390000	0.00369000	0.00364000	0.00368000	0.00389000	0.00472000	0.00649000
                     -8	0.00607000	0.00415000	0.00313000	0.00285000	0.00282000	0.00282000	0.00312000	0.00413000	0.00607000
                     -6	0.00573000	0.00370000	0.00256000	0.00219000	0.00217000	0.00219000	0.00254000	0.00370000	0.00574000
                     -4	0.00542000	0.00332000	0.00215000	0.00175000	0.00168000	0.00175000	0.00214000	0.00331000	0.00543000
                     -2	0.00516000	0.00320000	0.00194000	0.00148000	0.00140000	0.00149000	0.00194000	0.00319000	0.00516000
                      0	0.00504000	0.00323000	0.00199000	0.00139000	0.00129000	0.00139000	0.00199000	0.00323000	0.00503000
                      2	0.00501000	0.00330000	0.00221000	0.00143000	0.00130000	0.00143000	0.00221000	0.00330000	0.00501000
                      4	0.00543000	0.00359000	0.00262000	0.00159000	0.00146000	0.00160000	0.00263000	0.00359000	0.00543000
                      6	0.00582000	0.00335000	0.00201000	0.00175000	0.00155000	0.00179000	0.00199000	0.00337000	0.00588000
                      8	0.00651000	0.00441000	0.00150000	0.00148000	0.00181000	0.00149000	0.00151000	0.00439000	0.00658000
                     10	0.00725000	0.00470000	0.00061000	0.00162000	0.00094000	0.00169000	0.00061000	0.00472000	0.00739000
                     12	0.00961000	0.00961000	0.00114000	0.00116000	0.00008000	0.00125000	0.00129000	0.00963000	0.00950000
                     14	0.00951000	0.00969000	0.00472000	0.00186000	0.00265000	0.00196000	0.00479000	0.00971000	0.00957000
                     16	0.01000000	0.00912000	0.00505000	0.00347000	0.00694000	0.00351000	0.00506000	0.00918000	0.01016000
                     18	0.01200000	0.00552000	0.00420000	0.00347000	0.00634000	0.00354000	0.00418000	0.00545000	0.01203000
                     20	0.01123000	0.01122000	0.00405000	0.00411000	0.00434000	0.00413000	0.00416000	0.01137000	0.01138000
                     22	0.01565000	0.01537000	0.00547000	0.00493000	0.00638000	0.00494000	0.00538000	0.01526000	0.01575000
                     24	0.01961000	0.01394000	0.00767000	0.00707000	0.00787000	0.00709000	0.00758000	0.01389000	0.01952000
                     26	0.02170000	0.01921000	0.00952000	0.01028000	0.01189000	0.01023000	0.00949000	0.01909000	0.02181000
                     28	0.02761000	0.02142000	0.00894000	0.01493000	0.02611000	0.01485000	0.00888000	0.02152000	0.02779000
                     30	0.03067000	0.01801000	0.00691000	0.01752000	0.00739000	0.01757000	0.00690000	0.01807000	0.03075000
                     35	0.03038000	0.01541000	0.01053000	0.00765000	0.00903000	0.00763000	0.01062000	0.01543000	0.03085000
                     45	0.03653000	0.01424000	0.00739000	0.00588000	0.00562000	0.00595000	0.00742000	0.01457000	0.03682000
                     50	0.03387000	0.01518000	0.00748000	0.00541000	0.00503000	0.00533000	0.00751000	0.01528000	0.03398000
                     55	0.02721000	0.01632000	0.01104000	0.00987000	0.00838000	0.00999000	0.01106000	0.01629000	0.02728000
                     60	0.03162000	0.01773000	0.01463000	0.01275000	0.01331000	0.01393000	0.01465000	0.01803000	0.03206000
            </tableData>
          </table>
       </product>
    </function>
    <function name="aero/coefficients/CFXMN">
    <description>DRAG INCREMENT DUE TO MACH</description>
          <table>
            <independentVar lookup="row">velocities/mach</independentVar>
            <independentVar lookup="column">aero/alpha-deg</independentVar>
            <tableData>
                                -10	         -5	         -2	       0.01	          1	          2	          6	          7	         10
                    0.2	-0.00855000	-0.00163000	-0.00021000	-0.00019000	-0.00048000	-0.00096000	-0.00512000	-0.00679000	-0.01270000
                    0.4	-0.00566000	-0.00108000	-0.00014000	-0.00012000	-0.00032000	-0.00063000	-0.00341000	-0.00450000	-0.00849000
                    0.6	0.00000000	0.00000000	0.00000000	0.00000000	0.00000000	0.00000000	0.00000000	0.00000000	0.00000000
                    0.8	0.00864000	0.00181000	0.00022000	0.00022000	0.00057000	0.00111000	0.00538000	0.00707000	0.01279000
                    0.9	0.01229000	0.00293000	0.00036000	0.00040000	0.00100000	0.00189000	0.00811000	0.01032000	0.01828000
                   0.97	0.01426000	0.00414000	0.00048000	0.00060000	0.00147000	0.00268000	0.01003000	0.01236000	0.02195000
                   0.98	0.01373000	0.00435000	0.00050000	0.00064000	0.00156000	0.00287000	0.00988000	0.01192000	0.02157000
                   0.99	-0.04353000	-0.01895000	-0.01332000	0.00070000	-0.01437000	0.00297000	0.00889000	0.01035000	0.01914000
                    1.4	0.07028000	0.02509000	0.00791000	0.00507000	0.00756000	0.01264000	0.04423000	0.05476000	0.09387000
            </tableData>
          </table>
    </function>
    <function name="aero/coefficients/CFZB">
    <description>BASE LIFT</description>
          <table>
            <independentVar lookup="row">aero/alpha-deg</independentVar>
            <independentVar lookup="column">fcs/elevator-pos-deg</independentVar>
            <tableData>
                                -30	          0	         30
                    -20	-0.94786000	-1.05000000	-1.07259000
                    -10	-0.40964000	-0.52704000	-0.61800000
                     -8	-0.27962000	-0.39156000	-0.49163000
                     -6	-0.16327000	-0.27021000	-0.37776000
                     -4	-0.04997000	-0.15227000	-0.26257000
                     -2	0.05162000	-0.04825000	-0.15532000
                      0	0.14658000	0.04534000	-0.05992000
                      2	0.25149000	0.14372000	0.03480000
                      4	0.34967000	0.24873000	0.14926000
                      6	0.46036000	0.35905000	0.26412000
                      8	0.60036000	0.48874000	0.38217000
                     10	0.73063000	0.62704000	0.51728000
                     12	0.87249000	0.77148000	0.66030000
                     14	0.99068000	0.88842000	0.77989000
                     16	1.04143000	0.98081000	0.87202000
                     18	1.06778000	1.04581000	0.94304000
                     20	1.09002000	1.08653000	0.99351000
                     22	1.10614000	1.10306000	1.02801000
                     24	1.11332000	1.11108000	1.05060000
                     26	1.11193000	1.10941000	1.06251000
                     28	1.10614000	1.10408000	1.07066000
                     30	1.09531000	1.09346000	1.06764000
                     35	1.08274000	1.08088000	1.06457000
                     45	1.02752000	1.02689000	1.02330000
                     50	1.02510000	1.02472000	1.02340000
                     55	0.97732000	0.97736000	0.97702000
                     60	0.94259000	0.94269000	0.94237000
            </tableData>
          </table>
    </function>
    <function name="aero/coefficients/CFZDAD">
    <description>LIFT INCREMENT DUE TO AILERON DEFLECTION</description>
    <product>
          <property>fcs/aileron-pos-deg</property>
          <table>
            <independentVar lookup="row">aero/alpha-deg</independentVar>
            <independentVar lookup="column">aero/beta-deg</independentVar>
            <tableData>
                                -20	        -10	         -5	         -2	          0	          2	          5	         10	         20
                    -20	0.00312750	0.00126050	0.00095500	0.00091800	0.00090450	0.00086250	0.00092550	0.00092700	0.00094500
                    -10	0.00461500	0.00594750	0.00610600	0.00611200	0.00609000	0.00607900	0.00597050	0.00572200	0.00512900
                     -8	0.00442550	0.00582300	0.00618150	0.00631050	0.00647650	0.00660350	0.00673250	0.00671100	0.00610400
                     -6	0.00421000	0.00566700	0.00612300	0.00633650	0.00651800	0.00669600	0.00684650	0.00704800	0.00672500
                     -4	0.00417550	0.00534850	0.00586950	0.00608150	0.00627200	0.00643950	0.00668150	0.00702600	0.00678950
                     -2	0.00393100	0.00502850	0.00559250	0.00584250	0.00600000	0.00619400	0.00646350	0.00678650	0.00667400
                      0	0.00365150	0.00486500	0.00537650	0.00569000	0.00587550	0.00608050	0.00634950	0.00664800	0.00655150
                      2	0.00361700	0.00486000	0.00541050	0.00574300	0.00595850	0.00614350	0.00641600	0.00668400	0.00652250
                      4	0.00368800	0.00496200	0.00560250	0.00591600	0.00612550	0.00629400	0.00652900	0.00677900	0.00656150
                      6	0.00378050	0.00523400	0.00586250	0.00615700	0.00633400	0.00650650	0.00680900	0.00707150	0.00641000
                      8	0.00383650	0.00558400	0.00616050	0.00651100	0.00672100	0.00682000	0.00708950	0.00726550	0.00637450
                     10	0.00411500	0.00574400	0.00632000	0.00663450	0.00674600	0.00699750	0.00714650	0.00727950	0.00627200
                     12	0.00412600	0.00567550	0.00624650	0.00660550	0.00674500	0.00687500	0.00687200	0.00669850	0.00513500
                     14	0.00424850	0.00568650	0.00587400	0.00601550	0.00577150	0.00583350	0.00553450	0.00520150	0.00369450
                     16	0.00442200	0.00499750	0.00460800	0.00432450	0.00408800	0.00384400	0.00334850	0.00270850	0.00153000
                     18	0.00440700	0.00364050	0.00242400	0.00224850	0.00205050	0.00218200	0.00193000	0.00157300	0.00032200
                     20	0.00406150	0.00190000	0.00128550	0.00115900	0.00135600	0.00141350	0.00154950	0.00117800	-0.00005800
                     22	0.00309200	0.00112300	0.00091150	0.00078000	0.00076400	0.00088250	0.00125200	0.00102350	-0.00004900
                     24	0.00196900	0.00067550	0.00064350	0.00071800	0.00075850	0.00067700	0.00080600	0.00070000	-0.00002700
                     26	0.00113250	0.00051650	0.00049850	0.00045900	0.00049400	0.00041600	0.00051350	0.00051000	0.00004900
                     28	0.00077900	0.00045400	0.00043600	0.00049700	0.00056000	0.00042050	0.00035350	0.00015700	0.00023150
                     30	0.00069050	0.00042150	0.00044500	0.00044500	0.00038400	0.00041000	0.00035050	0.00021850	0.00024700
                     35	0.00043550	0.00036250	0.00033950	0.00034800	0.00037300	0.00035850	0.00040850	0.00032150	-0.00003700
                     45	0.00032400	0.00031700	0.00026150	0.00025200	0.00028000	0.00033700	0.00034500	0.00050300	0.00014000
                     50	0.00025650	0.00020950	0.00023400	0.00025300	0.00028300	0.00030650	0.00035550	0.00042600	0.00033950
                     55	0.00021250	0.00018400	0.00018450	0.00022100	0.00023800	0.00023600	0.00030250	0.00036250	0.00033600
                     60	0.00018150	0.00023900	0.00026100	0.00023200	0.00026450	0.00027100	0.00035000	0.00049250	0.00028450
            </tableData>
          </table>
       </product>
    </function>
    <function name="aero/coefficients/CFZDADMN">
    <description>LIFT DRAG CHANGE DUE TO MACH DUE TO AILERON DEFLECTION</description>
    <product>
          <property>fcs/aileron-pos-deg</property>
          <table>
            <independentVar lookup="row">velocities/mach</independentVar>
            <independentVar lookup="column">aero/alpha-deg</independentVar>
            <tableData>
                                -10	         -5	         -2	       0.01	          1	          2	          6	          7	         10
                    0.2	-0.00454850	-0.00178900	-0.00070150	-0.00031650	-0.00011800	0.00011550	0.00162900	0.00224300	0.00460700
                    0.4	-0.00285450	-0.00117250	-0.00046200	-0.00021050	-0.00008000	0.00007350	0.00106550	0.00146750	0.00298850
                    0.6	0.00000000	0.00000000	0.00000000	0.00000000	0.00000000	0.00000000	0.00000000	0.00000000	0.00000000
                    0.8	0.00291500	0.00167100	0.00072300	0.00036000	0.00017200	-0.00002900	-0.00114250	-0.00150600	-0.00231500
                    0.9	0.00325600	0.00231100	0.00114850	0.00059950	0.00033900	0.00009750	-0.00071650	-0.00085350	-0.00125500
                   0.97	0.00423350	0.00325450	0.00171800	0.00091350	0.00056850	0.00027800	-0.00043150	-0.00052550	-0.00074700
                   0.98	0.00453050	0.00349000	0.00185850	0.00099350	0.00063150	0.00032700	-0.00038200	-0.00048050	-0.00078400
                   0.99	0.00496200	0.00385600	0.00210000	0.00115300	0.00076850	0.00044350	-0.00028500	-0.00032300	-0.00076450
                    1.4	-0.00821500	-0.00399650	-0.00280050	-0.00297800	-0.00308750	-0.00315700	-0.00240500	-0.00188800	0.00085600
            </tableData>
          </table>
       </product>
    </function>
    <function name="aero/coefficients/CFZDRD">
    <description>LIFT INCREMENT DUE TO RUDDER DEFLECTION</description>
    <product>
          <property>fcs/rudder-pos-deg</property>
          <table>
            <independentVar lookup="row">aero/alpha-deg</independentVar>
            <independentVar lookup="column">aero/beta-deg</independentVar>
            <tableData>
                                -20	        -10	         -5	         -2	          0	          2	          5	         10	         20
                    -20	-0.00019900	-0.00022400	-0.00000050	0.00002250	0.00009600	0.00001850	-0.00004350	-0.00005200	0.00022200
                    -10	-0.00032000	-0.00005950	-0.00014950	-0.00009300	0.00001450	0.00006350	0.00013150	0.00025600	0.00042200
                     -8	-0.00035750	-0.00005900	-0.00020450	-0.00009550	0.00007250	0.00007400	0.00013600	0.00025700	0.00046900
                     -6	-0.00038300	-0.00010650	-0.00016850	-0.00018400	0.00000400	0.00005750	0.00013200	0.00024250	0.00048450
                     -4	-0.00041650	-0.00016450	-0.00023400	-0.00020250	-0.00004900	0.00006550	0.00014350	0.00026550	0.00053750
                     -2	-0.00031500	-0.00011800	-0.00016700	-0.00010850	-0.00002650	0.00005350	0.00013200	0.00022400	0.00049750
                      0	-0.00017650	-0.00006900	-0.00004350	0.00000750	0.00000800	0.00000650	0.00008400	0.00017350	0.00040250
                      2	-0.00013950	-0.00005100	-0.00004550	0.00005850	0.00005200	0.00001100	0.00009850	0.00012800	0.00036300
                      4	-0.00014650	-0.00013650	-0.00006650	0.00006700	0.00003250	0.00000650	0.00011350	0.00016400	0.00038500
                      6	-0.00016800	-0.00026550	0.00008250	0.00010400	0.00002400	-0.00004800	-0.00008800	0.00027850	0.00039650
                      8	-0.00034500	-0.00021150	0.00011550	0.00005500	-0.00003700	-0.00008900	-0.00010950	0.00021350	0.00056700
                     10	-0.00040650	-0.00013600	0.00010350	0.00011950	0.00000100	-0.00011900	-0.00003900	0.00020600	0.00060250
                     12	-0.00041700	-0.00030850	0.00003500	-0.00000150	-0.00000850	-0.00001050	-0.00009700	0.00024950	0.00045200
                     14	-0.00044750	-0.00033400	0.00006300	-0.00003450	-0.00005100	0.00005450	-0.00010150	0.00020100	0.00050850
                     16	-0.00037650	-0.00010400	0.00006900	-0.00001350	-0.00005350	0.00002750	-0.00001300	0.00014650	0.00039000
                     18	-0.00028200	-0.00000800	0.00012650	0.00003400	0.00002300	0.00002350	-0.00014250	-0.00009050	0.00020950
                     20	-0.00014750	0.00027450	0.00013650	0.00007000	0.00002900	-0.00006600	-0.00014300	-0.00023600	0.00022500
                     22	-0.00001900	0.00030100	0.00017900	0.00004000	0.00000250	-0.00003900	-0.00017200	-0.00040350	0.00012350
                     24	0.00002100	0.00031250	0.00007350	0.00002150	-0.00000300	-0.00001700	-0.00006200	-0.00045150	0.00010700
                     26	0.00000400	0.00034750	0.00002550	-0.00001300	0.00000050	-0.00000650	-0.00004000	-0.00041050	0.00008500
                     28	-0.00002450	0.00014100	-0.00000550	-0.00001400	-0.00000850	0.00000450	0.00001100	-0.00014450	0.00014550
                     30	-0.00000650	-0.00020150	-0.00003950	-0.00001550	0.00000200	0.00000900	0.00005100	0.00003300	0.00018950
                     35	0.00001450	-0.00014500	-0.00010850	-0.00005950	-0.00000700	0.00005250	0.00013000	0.00019150	0.00008350
                     45	-0.00002050	-0.00006650	-0.00006550	-0.00003400	-0.00000250	0.00003150	0.00007650	0.00010050	0.00001100
                     50	-0.00000100	-0.00001750	-0.00001950	-0.00001050	0.00000250	0.00001150	0.00003000	0.00004450	0.00002250
                     55	0.00002200	0.00001950	0.00001050	0.00000300	0.00000000	-0.00000200	-0.00000200	0.00000250	0.00001050
                     60	0.00004950	0.00004800	0.00002700	0.00000850	0.00000100	-0.00002000	-0.00001950	-0.00002750	-0.00001400
            </tableData>
          </table>
       </product>
    </function>
    <function name="aero/coefficients/CFZDRDMN">
    <description>LIFT DRAG CHANGE DUE TO MACH DUE TO RUDDER DEFLECTION</description>
    <product>
          <property>fcs/rudder-pos-deg</property>
          <table>
            <independentVar lookup="row">velocities/mach</independentVar>
            <independentVar lookup="column">aero/alpha-deg</independentVar>
            <tableData>
                                -10	         -5	         -2	       0.01	          1	          2	          6	          7	         10
                    0.2	-0.00407550	-0.00101500	-0.00013750	0.00017100	0.00038400	0.00063750	0.00230400	0.00299900	0.00532300
                    0.4	-0.00265500	-0.00066100	-0.00008850	0.00011800	0.00025150	0.00041650	0.00150250	0.00195400	0.00341300
                    0.6	0.00000000	0.00000000	0.00000000	0.00000000	0.00000000	0.00000000	0.00000000	0.00000000	0.00000000
                    0.8	0.00281750	0.00091250	0.00011800	-0.00019100	-0.00036650	-0.00056900	-0.00173450	-0.00207850	-0.00312350
                    0.9	0.00269550	0.00120400	0.00016950	-0.00030700	-0.00053050	-0.00078250	-0.00162000	-0.00179300	-0.00229000
                   0.97	0.00305800	0.00164550	0.00021350	-0.00045800	-0.00076800	-0.00105600	-0.00182000	-0.00188550	-0.00235700
                   0.98	0.00318300	0.00174000	0.00021850	-0.00049300	-0.00081750	-0.00112000	-0.00190350	-0.00195150	-0.00249700
                   0.99	0.00335050	0.00185250	0.00021650	-0.00054200	-0.00087500	-0.00122050	-0.00202650	-0.00206150	-0.00264450
                    1.4	-0.00506450	-0.00064200	0.00005300	-0.00032550	-0.00045200	-0.00050950	0.00066450	0.00125600	0.00414600
            </tableData>
          </table>
       </product>
    </function>
    <function name="aero/coefficients/CFZFLAPS">
    <description>LIFT INCREMENT DUE TO FLAPS</description>
          <table>
            <independentVar lookup="row">aero/alpha-deg</independentVar>
            <independentVar lookup="column">fcs/flap-pos-deg</independentVar>
            <tableData>
                                  0	         45
                    -20	0.00000000	0.26854000
                    -10	0.00000000	0.34760000
                     -8	0.00000000	0.33359000
                     -6	0.00000000	0.32628000
                     -4	0.00000000	0.29724000
                     -2	0.00000000	0.27046000
                      0	0.00000000	0.26595000
                      2	0.00000000	0.27098000
                      4	0.00000000	0.27241000
                      6	0.00000000	0.26710000
                      8	0.00000000	0.26326000
                     10	0.00000000	0.23494000
                     12	0.00000000	0.14066000
                     14	0.00000000	0.09941000
                     16	0.00000000	0.04640000
                     18	0.00000000	0.00938000
                     20	0.00000000	-0.00841000
                     22	0.00000000	0.00467000
                     24	0.00000000	0.00489000
                     26	0.00000000	0.00624000
                     28	0.00000000	0.00914000
                     30	0.00000000	0.00618000
                     35	0.00000000	0.01218000
                     45	0.00000000	0.00439000
                     50	0.00000000	0.00871000
                     55	0.00000000	0.00597000
                     60	0.00000000	0.00215000
            </tableData>
          </table>
    </function>
    <function name="aero/coefficients/CFZGEAR">
    <description>LIFT INCREMENT DUE TO GEAR</description>
    <product>
          <property>gear/gear-pos-norm</property>
          <table>
            <independentVar lookup="row">aero/alpha-deg</independentVar>
            <independentVar lookup="column">aero/beta-deg</independentVar>
            <tableData>
                                -20	        -10	         -5	         -2	          0	          2	          5	         10	         20
                    -20	-0.04308000	-0.04496000	-0.04449000	-0.04429000	-0.04453000	-0.04430000	-0.04458000	-0.04506000	-0.04327000
                    -10	-0.00033000	-0.02384000	-0.02390000	-0.02377000	-0.02370000	-0.02377000	-0.02389000	-0.02389000	-0.00048000
                     -8	0.00441000	-0.01798000	-0.01930000	-0.01934000	-0.01937000	-0.01891000	-0.01931000	-0.01807000	0.00478000
                     -6	0.00913000	-0.01276000	-0.01442000	-0.01426000	-0.01438000	-0.01433000	-0.01411000	-0.01288000	0.00900000
                     -4	0.01361000	-0.00753000	-0.00972000	-0.00992000	-0.00998000	-0.00996000	-0.00969000	-0.00765000	0.01340000
                     -2	0.01928000	-0.00238000	-0.00455000	-0.00505000	-0.00521000	-0.00532000	-0.00466000	-0.00251000	0.01912000
                      0	0.02524000	0.00241000	0.00038000	-0.00005000	0.00017000	-0.00008000	0.00035000	0.00237000	0.02513000
                      2	0.02806000	0.00909000	0.00629000	0.00564000	0.00583000	0.00579000	0.00630000	0.00905000	0.02792000
                      4	0.03698000	0.02021000	0.01262000	0.01282000	0.01340000	0.01283000	0.01273000	0.02019000	0.03692000
                      6	0.04594000	0.03254000	0.02166000	0.02152000	0.02183000	0.02208000	0.02165000	0.03283000	0.04620000
                      8	0.06081000	0.03860000	0.03501000	0.03232000	0.03557000	0.03251000	0.03515000	0.03874000	0.06136000
                     10	0.07333000	0.04523000	0.04571000	0.04110000	0.04294000	0.04180000	0.04586000	0.04555000	0.07421000
                     12	0.09065000	0.07051000	0.03815000	0.04191000	0.04192000	0.04262000	0.03937000	0.07108000	0.09073000
                     14	0.09288000	0.06834000	0.04568000	0.04289000	0.04889000	0.04326000	0.04594000	0.06822000	0.09302000
                     16	0.08812000	0.06406000	0.05009000	0.04806000	0.04788000	0.04786000	0.04995000	0.06404000	0.08815000
                     18	0.09274000	0.06977000	0.05268000	0.04359000	0.04239000	0.04368000	0.05234000	0.06940000	0.09266000
                     20	0.08016000	0.07696000	0.05099000	0.04547000	0.03918000	0.04534000	0.05084000	0.07644000	0.08055000
                     22	0.07662000	0.08105000	0.05280000	0.04945000	0.05055000	0.04945000	0.05240000	0.08080000	0.07682000
                     24	0.07659000	0.08289000	0.05711000	0.05354000	0.05542000	0.05352000	0.05677000	0.08277000	0.07594000
                     26	0.08170000	0.07845000	0.06390000	0.06016000	0.05708000	0.06003000	0.06390000	0.07828000	0.08150000
                     28	0.08051000	0.07938000	0.07003000	0.06136000	0.05625000	0.06099000	0.06981000	0.07941000	0.08036000
                     30	0.08009000	0.07557000	0.07029000	0.06331000	0.06235000	0.06331000	0.07023000	0.07575000	0.07967000
                     35	0.08188000	0.07878000	0.07099000	0.06444000	0.06401000	0.06446000	0.07100000	0.07889000	0.08180000
                     45	0.10965000	0.08289000	0.06769000	0.06292000	0.06240000	0.06286000	0.06747000	0.08307000	0.10965000
                     50	0.10206000	0.08340000	0.06831000	0.06311000	0.06186000	0.06299000	0.06821000	0.08334000	0.10187000
                     55	0.09563000	0.08278000	0.06928000	0.06474000	0.06327000	0.06475000	0.06920000	0.08250000	0.09506000
                     60	0.09959000	0.08247000	0.07160000	0.06618000	0.06581000	0.06655000	0.07150000	0.08254000	0.09958000
            </tableData>
          </table>
       </product>
    </function>
    <function name="aero/coefficients/CFZMN">
    <description>LIFT INCREMENT DUE TO MACH</description>
          <table>
            <independentVar lookup="row">velocities/mach</independentVar>
            <independentVar lookup="column">aero/alpha-deg</independentVar>
            <tableData>
                                -10	         -5	         -2	       0.01	          1	          2	          6	          7	         10
                    0.2	0.08195000	0.02058000	0.00289000	-0.00360000	-0.00781000	-0.01296000	-0.04656000	-0.05989000	-0.10628000
                    0.4	0.05332000	0.01343000	0.00188000	-0.00237000	-0.00512000	-0.00847000	-0.03057000	-0.03906000	-0.06817000
                    0.6	0.00000000	0.00000000	0.00000000	0.00000000	0.00000000	0.00000000	0.00000000	0.00000000	0.00000000
                    0.8	-0.05676000	-0.01801000	-0.00262000	0.00376000	0.00755000	0.01152000	0.03456000	0.04169000	0.06327000
                    0.9	-0.05503000	-0.02413000	-0.00399000	0.00588000	0.01068000	0.01526000	0.03213000	0.03613000	0.04744000
                   0.97	-0.06420000	-0.03388000	-0.00596000	0.00854000	0.01474000	0.02033000	0.03622000	0.03926000	0.04911000
                   0.98	-0.06729000	-0.03631000	-0.00643000	0.00922000	0.01566000	0.02216000	0.03770000	0.03983000	0.05185000
                   0.99	0.52706000	0.21054000	0.04834000	0.00995000	-0.09361000	0.02374000	0.04005000	0.04177000	0.05440000
                    1.4	0.09913000	0.01455000	-0.00095000	0.00645000	0.00876000	0.01007000	-0.01324000	-0.02575000	-0.08427000
            </tableData>
          </table>
    </function>
    <function name="aero/coefficients/CMM1">
    <description>BASE PITCHING MOMENT</description>
          <table>
            <independentVar lookup="row">aero/alpha-deg</independentVar>
            <independentVar lookup="column">fcs/elevator-pos-deg</independentVar>
            <tableData>
                                -30	          0	         30
                    -20	0.26469000	0.50395000	0.56230000
                    -10	0.00723000	0.27686000	0.49450000
                     -8	-0.05811000	0.20010000	0.43925000
                     -6	-0.11843000	0.12931000	0.38883000
                     -4	-0.16166000	0.07776000	0.34405000
                     -2	-0.19239000	0.04278000	0.30096000
                      0	-0.22017000	0.01700000	0.26637000
                      2	-0.25009000	-0.00434000	0.24223000
                      4	-0.28734000	-0.02420000	0.23053000
                      6	-0.31437000	-0.04446000	0.21005000
                      8	-0.35752000	-0.08577000	0.16156000
                     10	-0.39664000	-0.14429000	0.10411000
                     12	-0.47345000	-0.21855000	0.03814000
                     14	-0.55262000	-0.29015000	-0.02654000
                     16	-0.52772000	-0.36234000	-0.09100000
                     18	-0.48973000	-0.41336000	-0.15597000
                     20	-0.45467000	-0.42769000	-0.18953000
                     22	-0.43368000	-0.41178000	-0.22060000
                     24	-0.40844000	-0.39162000	-0.24026000
                     26	-0.39789000	-0.38267000	-0.26826000
                     28	-0.38403000	-0.37140000	-0.29339000
                     30	-0.36759000	-0.35677000	-0.30012000
                     35	-0.35232000	-0.34427000	-0.31402000
                     45	-0.31744000	-0.31605000	-0.31810000
                     50	-0.36525000	-0.36501000	-0.37207000
                     55	-0.34206000	-0.34324000	-0.35222000
                     60	-0.34874000	-0.35000000	-0.35813000
            </tableData>
          </table>
    </function>
    <function name="aero/coefficients/CMMALPHADOT">
    <description>PITCH MOMENT DERIVATIVE FOR ALPHA DOT</description>
    <product>
          <property>aero/alphadot-rad_sec-limited</property>
          <table>
            <independentVar lookup="row">aero/alpha-deg</independentVar>
            <tableData>
                    -20		0.05109220
                    -10		-2.20113210
                     -8		-2.19831010
                     -6		-1.70930250
                     -4		-1.08149200
                     -2		-0.84598800
                      0		-0.69993560
                      2		-0.63802080
                      4		-0.60606920
                      6		-0.77437530
                      8		-1.18657710
                     10		-2.52524930
                     12		-2.89095750
                     14		-2.66443020
                     16		-1.47490270
                     18		-0.86146100
                     20		0.02642200
                     22		0.09750480
                     24		0.64118010
                     26		-0.16648910
                     28		0.24585740
                     30		-1.03232510
                     35		0.67153340
                     45		-0.92151270
                     50		0.64587470
                     55		0.21421790
                     60		-0.08052150
            </tableData>
          </table>
       </product>
    </function>
    <function name="aero/coefficients/CMMDAD">
    <description>PITCH MOMENT DUE TO AILERON DEFLECTION</description>
    <product>
          <property>fcs/aileron-pos-deg</property>
          <table>
            <independentVar lookup="row">aero/alpha-deg</independentVar>
            <independentVar lookup="column">aero/beta-deg</independentVar>
            <tableData>
                                -20	        -10	         -5	         -2	          0	          2	          5	         10	         20
                    -20	-0.00304450	-0.00206100	-0.00185700	-0.00183550	-0.00182600	-0.00183100	-0.00176600	-0.00172350	-0.00145000
                    -10	-0.00389450	-0.00510600	-0.00550900	-0.00558300	-0.00553850	-0.00539800	-0.00510700	-0.00466800	-0.00359800
                     -8	-0.00356250	-0.00476450	-0.00550050	-0.00572450	-0.00582950	-0.00580650	-0.00577050	-0.00549100	-0.00444150
                     -6	-0.00320250	-0.00440000	-0.00523950	-0.00550600	-0.00559650	-0.00571650	-0.00578450	-0.00573650	-0.00500700
                     -4	-0.00284000	-0.00409100	-0.00473150	-0.00502650	-0.00519850	-0.00535650	-0.00555700	-0.00571850	-0.00497000
                     -2	-0.00245650	-0.00387050	-0.00434200	-0.00476550	-0.00497650	-0.00512950	-0.00531400	-0.00546550	-0.00474100
                      0	-0.00251150	-0.00378700	-0.00440000	-0.00469850	-0.00487000	-0.00501300	-0.00518350	-0.00526850	-0.00444350
                      2	-0.00269950	-0.00391700	-0.00451600	-0.00473650	-0.00487400	-0.00500150	-0.00515850	-0.00519400	-0.00417700
                      4	-0.00291950	-0.00417650	-0.00468400	-0.00490600	-0.00502500	-0.00507900	-0.00510300	-0.00509150	-0.00397850
                      6	-0.00310000	-0.00455100	-0.00504150	-0.00521450	-0.00527650	-0.00533250	-0.00541150	-0.00519200	-0.00355450
                      8	-0.00332550	-0.00509800	-0.00540600	-0.00570300	-0.00592650	-0.00576650	-0.00592400	-0.00569950	-0.00338550
                     10	-0.00369650	-0.00519800	-0.00578550	-0.00601300	-0.00601900	-0.00621350	-0.00628050	-0.00587650	-0.00333100
                     12	-0.00367650	-0.00539900	-0.00594350	-0.00614550	-0.00617750	-0.00635750	-0.00612150	-0.00567050	-0.00226800
                     14	-0.00386050	-0.00530050	-0.00562800	-0.00599050	-0.00565600	-0.00580750	-0.00531750	-0.00483950	-0.00141950
                     16	-0.00395300	-0.00456250	-0.00476700	-0.00480700	-0.00496700	-0.00478750	-0.00432600	-0.00334800	-0.00010700
                     18	-0.00390850	-0.00365100	-0.00306500	-0.00362450	-0.00357500	-0.00406350	-0.00367000	-0.00282650	0.00040750
                     20	-0.00359950	-0.00271350	-0.00245700	-0.00228250	-0.00285000	-0.00295000	-0.00333150	-0.00242650	0.00050800
                     22	-0.00303150	-0.00224100	-0.00198900	-0.00182000	-0.00182200	-0.00210000	-0.00291400	-0.00218050	0.00024250
                     24	-0.00243300	-0.00170450	-0.00165900	-0.00166400	-0.00168850	-0.00162700	-0.00193350	-0.00165450	-0.00003050
                     26	-0.00197450	-0.00159850	-0.00153700	-0.00147800	-0.00153150	-0.00141350	-0.00145050	-0.00143150	-0.00019050
                     28	-0.00173650	-0.00139100	-0.00133400	-0.00138900	-0.00144650	-0.00130050	-0.00122100	-0.00085350	-0.00079350
                     30	-0.00164550	-0.00121200	-0.00124750	-0.00124100	-0.00119150	-0.00119250	-0.00113550	-0.00087700	-0.00088450
                     35	-0.00105250	-0.00094700	-0.00093650	-0.00094800	-0.00099250	-0.00096000	-0.00104150	-0.00081600	-0.00055050
                     45	-0.00067100	-0.00066700	-0.00057400	-0.00058000	-0.00065150	-0.00074400	-0.00078300	-0.00106150	-0.00054300
                     50	-0.00049450	-0.00043050	-0.00047700	-0.00052700	-0.00060500	-0.00063550	-0.00076600	-0.00094550	-0.00080750
                     55	-0.00039250	-0.00035850	-0.00036350	-0.00043900	-0.00048900	-0.00048600	-0.00065200	-0.00083900	-0.00072650
                     60	-0.00036800	-0.00047200	-0.00052750	-0.00047550	-0.00055950	-0.00057350	-0.00079200	-0.00119550	-0.00069500
            </tableData>
          </table>
       </product>
    </function>
    <function name="aero/coefficients/CMMDADMN">
    <description>PITCH MOMENT DRAG CHANGE DUE TO MACH DUE TO AILERON DEFLECTION</description>
    <product>
          <property>fcs/aileron-pos-deg</property>
          <table>
            <independentVar lookup="row">velocities/mach</independentVar>
            <independentVar lookup="column">aero/alpha-deg</independentVar>
            <tableData>
                                -10	         -5	         -2	       0.01	          1	          2	          6	          7	         10
                    0.2	0.00359050	0.00151150	0.00081100	0.00059450	0.00051450	0.00044300	0.00006600	-0.00016500	-0.00126900
                    0.4	0.00223100	0.00099450	0.00053700	0.00039700	0.00034400	0.00029700	0.00004800	-0.00010500	-0.00083050
                    0.6	0.00000000	0.00000000	0.00000000	0.00000000	0.00000000	0.00000000	0.00000000	0.00000000	0.00000000
                    0.8	-0.00227100	-0.00147050	-0.00087550	-0.00068950	-0.00061200	-0.00054750	-0.00021750	-0.00004850	0.00059600
                    0.9	-0.00270050	-0.00207100	-0.00139700	-0.00115700	-0.00106050	-0.00098450	-0.00075650	-0.00059850	0.00058400
                   0.97	-0.00341300	-0.00299350	-0.00214800	-0.00181300	-0.00169550	-0.00161250	-0.00140750	-0.00114400	0.00102700
                   0.98	-0.00356700	-0.00324100	-0.00234450	-0.00198250	-0.00186400	-0.00177350	-0.00156600	-0.00125250	0.00127000
                   0.99	-0.00373650	-0.00362450	-0.00266450	-0.00225800	-0.00213400	-0.00205300	-0.00176200	-0.00147900	0.00162200
                    1.4	0.00190800	-0.00038500	0.00034500	0.00154300	0.00220350	0.00279850	0.00565250	0.00635100	0.00813500
            </tableData>
          </table>
       </product>
    </function>
    <function name="aero/coefficients/CMMDRD">
    <description>PITCH MOMENT DUE TO RUDDER DEFLECTION</description>
    <product>
          <property>fcs/rudder-pos-deg</property>
          <table>
            <independentVar lookup="row">aero/alpha-deg</independentVar>
            <independentVar lookup="column">aero/beta-deg</independentVar>
            <tableData>
                                -20	        -10	         -5	         -2	          0	          2	          5	         10	         20
                    -20	0.00061750	0.00049200	-0.00016050	-0.00023150	-0.00046500	-0.00027600	-0.00016550	-0.00022250	-0.00094250
                    -10	0.00093850	0.00024750	0.00030200	0.00006000	-0.00019000	-0.00028750	-0.00048200	-0.00083550	-0.00128750
                     -8	0.00100450	0.00025100	0.00035350	0.00007000	-0.00025100	-0.00028900	-0.00048250	-0.00081750	-0.00134550
                     -6	0.00102100	0.00028350	0.00033600	0.00025400	-0.00010050	-0.00022400	-0.00046950	-0.00078300	-0.00136750
                     -4	0.00105950	0.00041600	0.00043050	0.00023950	0.00000650	-0.00020900	-0.00049550	-0.00080950	-0.00144850
                     -2	0.00092500	0.00039700	0.00037150	0.00012500	-0.00003250	-0.00021850	-0.00046850	-0.00077100	-0.00139700
                      0	0.00072850	0.00047900	0.00027050	0.00009950	-0.00003600	-0.00017650	-0.00040300	-0.00075150	-0.00125950
                      2	0.00064550	0.00055650	0.00022300	0.00002350	-0.00009000	-0.00018950	-0.00036400	-0.00074900	-0.00117600
                      4	0.00062450	0.00066900	0.00027550	0.00006250	-0.00010700	-0.00025350	-0.00040200	-0.00076750	-0.00116450
                      6	0.00069000	0.00075500	0.00036850	0.00010450	-0.00005550	-0.00026750	-0.00044200	-0.00079800	-0.00120650
                      8	0.00092300	0.00094900	0.00039300	0.00025550	0.00000400	-0.00023950	-0.00046050	-0.00101000	-0.00140900
                     10	0.00118100	0.00081500	0.00035400	0.00023700	-0.00005550	-0.00029200	-0.00050450	-0.00103700	-0.00164250
                     12	0.00106250	0.00099950	0.00039850	-0.00001100	-0.00001450	0.00002350	-0.00031450	-0.00090300	-0.00117500
                     14	0.00105750	0.00089600	-0.00004850	-0.00000050	0.00008800	-0.00001450	0.00014250	-0.00066150	-0.00118300
                     16	0.00086350	0.00039950	-0.00030050	-0.00008450	0.00003750	0.00011400	0.00010150	-0.00039850	-0.00087900
                     18	0.00067800	-0.00007600	-0.00047450	-0.00018600	0.00007750	0.00009350	0.00059300	0.00036950	-0.00049250
                     20	0.00040800	-0.00054050	-0.00048050	-0.00026150	-0.00004500	0.00032150	0.00057950	0.00066650	-0.00056450
                     22	0.00012900	-0.00057800	-0.00044500	-0.00010450	0.00000500	0.00018150	0.00049800	0.00088800	-0.00036200
                     24	0.00003550	-0.00059550	-0.00016550	-0.00004200	0.00003350	0.00011650	0.00022500	0.00089100	-0.00033250
                     26	0.00002500	-0.00070200	-0.00004750	0.00008800	0.00002200	0.00006150	0.00014400	0.00090150	-0.00023200
                     28	0.00004050	-0.00027800	-0.00001200	0.00005550	0.00003750	0.00002300	0.00005650	0.00031050	-0.00032150
                     30	0.00000900	0.00049250	0.00005650	0.00005700	0.00001350	0.00000800	-0.00003450	-0.00011250	-0.00037200
                     35	-0.00016550	0.00018400	0.00017600	0.00013350	0.00002150	-0.00008300	-0.00019650	-0.00025100	0.00001700
                     45	0.00002950	0.00009350	0.00012100	0.00007300	0.00000050	-0.00005900	-0.00013650	-0.00012750	0.00003550
                     50	0.00000050	0.00002250	0.00003500	0.00002100	-0.00001100	-0.00002200	-0.00005350	-0.00005750	-0.00001400
                     55	-0.00001150	-0.00002200	-0.00001750	-0.00000550	-0.00000150	0.00000350	0.00000350	-0.00000250	-0.00000900
                     60	-0.00001600	-0.00005550	-0.00004650	-0.00001000	-0.00000400	0.00004350	0.00003050	0.00003300	0.00000500
            </tableData>
          </table>
       </product>
    </function>
    <function name="aero/coefficients/CMMDRDMN">
    <description>PITCH MOMENT DRAG CHANGE DUE TO MACH DUE TO RUDDER DEFLECTION</description>
    <product>
          <property>fcs/rudder-pos-deg</property>
          <table>
            <independentVar lookup="row">velocities/mach</independentVar>
            <independentVar lookup="column">aero/alpha-deg</independentVar>
            <tableData>
                                -10	         -5	         -2	       0.01	          1	          2	          6	          7	         10
                    0.2	0.00309750	0.00076950	0.00023250	0.00006450	-0.00000500	-0.00007600	-0.00060000	-0.00094150	-0.00211850
                    0.4	0.00199750	0.00049750	0.00015000	0.00004100	-0.00000400	-0.00005000	-0.00039300	-0.00061600	-0.00138750
                    0.6	0.00000000	0.00000000	0.00000000	0.00000000	0.00000000	0.00000000	0.00000000	0.00000000	0.00000000
                    0.8	-0.00194200	-0.00064950	-0.00017500	-0.00003400	0.00002150	0.00008150	0.00052450	0.00071050	0.00169900
                    0.9	-0.00171350	-0.00073850	-0.00017550	0.00000350	0.00006450	0.00012300	0.00048750	0.00072550	0.00224900
                   0.97	-0.00147950	-0.00086300	-0.00013450	0.00007700	0.00013250	0.00020900	0.00063750	0.00092250	0.00362250
                   0.98	-0.00137400	-0.00085950	-0.00011400	0.00009750	0.00015100	0.00022950	0.00071050	0.00100950	0.00410750
                   0.99	-0.00118500	-0.00081750	-0.00006950	0.00012750	0.00017400	0.00024950	0.00085500	0.00120900	0.00475300
                    1.4	0.00007200	-0.00203350	-0.00076600	0.00055700	0.00126800	0.00195850	0.00439900	0.00516750	0.00683250
            </tableData>
          </table>
       </product>
    </function>
    <function name="aero/coefficients/CMMFLAPS">
    <description>PITCHING MOMENT INCREMENT DUE TO FLAPS</description>
          <table>
            <independentVar lookup="row">aero/alpha-deg</independentVar>
            <independentVar lookup="column">fcs/flap-pos-deg</independentVar>
            <tableData>
                                  0	         45
                    -20	0.00000000	-0.20565000
                    -10	0.00000000	-0.19950000
                     -8	0.00000000	-0.17412000
                     -6	0.00000000	-0.13834000
                     -4	0.00000000	-0.10542000
                     -2	0.00000000	-0.08037000
                      0	0.00000000	-0.05252000
                      2	0.00000000	-0.02849000
                      4	0.00000000	-0.01940000
                      6	0.00000000	-0.02583000
                      8	0.00000000	-0.05413000
                     10	0.00000000	-0.06211000
                     12	0.00000000	0.02358000
                     14	0.00000000	-0.01226000
                     16	0.00000000	0.02828000
                     18	0.00000000	0.03012000
                     20	0.00000000	0.01180000
                     22	0.00000000	-0.05348000
                     24	0.00000000	-0.08731000
                     26	0.00000000	-0.08464000
                     28	0.00000000	-0.08220000
                     30	0.00000000	-0.07108000
                     35	0.00000000	-0.06730000
                     45	0.00000000	-0.03820000
                     50	0.00000000	-0.03960000
                     55	0.00000000	-0.02974000
                     60	0.00000000	-0.01967000
            </tableData>
          </table>
    </function>
    <function name="aero/coefficients/CMMGEAR">
    <description>PITCHING MOMENT INCREMENT DUE TO GEAR</description>
    <product>
          <property>gear/gear-pos-norm</property>
          <table>
            <independentVar lookup="row">aero/alpha-deg</independentVar>
            <independentVar lookup="column">aero/beta-deg</independentVar>
            <tableData>
                                -20	        -10	         -5	         -2	          0	          2	          5	         10	         20
                    -20	0.00609000	-0.00080000	-0.00402000	-0.00536000	-0.00596000	-0.00538000	-0.00399000	-0.00065000	0.00622000
                    -10	0.00783000	-0.00769000	-0.01336000	-0.01491000	-0.01518000	-0.01491000	-0.01338000	-0.00775000	0.00767000
                     -8	0.00812000	-0.00293000	-0.00912000	-0.01095000	-0.01156000	-0.01096000	-0.00913000	-0.00298000	0.00804000
                     -6	0.00889000	0.00064000	-0.00515000	-0.00715000	-0.00749000	-0.00712000	-0.00518000	0.00060000	0.00877000
                     -4	0.01009000	0.00252000	-0.00202000	-0.00387000	-0.00454000	-0.00386000	-0.00190000	0.00250000	0.01005000
                     -2	0.00950000	0.00362000	0.00076000	-0.00123000	-0.00175000	-0.00122000	0.00081000	0.00366000	0.00946000
                      0	0.00856000	0.00530000	0.00375000	0.00097000	0.00004000	0.00099000	0.00379000	0.00527000	0.00852000
                      2	0.00776000	0.00466000	0.00610000	0.00334000	0.00173000	0.00330000	0.00603000	0.00458000	0.00778000
                      4	0.00398000	0.00310000	0.00916000	0.00498000	0.00301000	0.00491000	0.00892000	0.00291000	0.00404000
                      6	0.00319000	0.00333000	0.01085000	0.00513000	0.00275000	0.00482000	0.01071000	0.00271000	0.00303000
                      8	0.00719000	0.01120000	0.00628000	0.00455000	-0.00451000	0.00420000	0.00601000	0.01083000	0.00714000
                     10	0.00819000	0.01853000	0.00375000	0.00792000	0.00052000	0.00677000	0.00326000	0.01793000	0.00739000
                     12	-0.00444000	0.02004000	0.04838000	0.01468000	0.01507000	0.01376000	0.04634000	0.01946000	-0.00583000
                     14	-0.00264000	0.03454000	0.03985000	0.02474000	0.00760000	0.02385000	0.03954000	0.03460000	-0.00283000
                     16	0.00174000	0.04800000	0.03960000	0.02381000	0.01942000	0.02404000	0.03950000	0.04780000	0.00155000
                     18	0.00074000	0.04550000	0.03941000	0.04235000	0.03627000	0.04210000	0.04001000	0.04552000	0.00048000
                     20	0.03973000	0.03993000	0.05202000	0.04288000	0.05218000	0.04299000	0.05262000	0.04045000	0.03932000
                     22	0.05851000	0.03909000	0.05436000	0.04372000	0.03631000	0.04352000	0.05491000	0.03905000	0.05777000
                     24	0.06288000	0.04228000	0.04706000	0.03311000	0.02607000	0.03307000	0.04760000	0.04211000	0.06272000
                     26	0.05883000	0.04146000	0.03401000	0.02448000	0.02480000	0.02463000	0.03384000	0.04137000	0.05884000
                     28	0.06371000	0.03978000	0.02841000	0.02276000	0.01470000	0.02287000	0.02859000	0.03944000	0.06322000
                     30	0.06638000	0.04995000	0.03178000	0.02104000	0.02860000	0.02100000	0.03169000	0.04940000	0.06618000
                     35	0.06172000	0.03552000	0.02542000	0.02500000	0.02471000	0.02540000	0.02503000	0.03502000	0.06152000
                     45	0.03309000	0.03498000	0.02959000	0.02812000	0.02807000	0.02817000	0.02937000	0.03415000	0.03280000
                     50	0.05034000	0.03291000	0.03002000	0.02884000	0.02917000	0.02885000	0.02986000	0.03273000	0.05002000
                     55	0.06176000	0.03285000	0.02757000	0.02476000	0.02556000	0.02478000	0.02749000	0.03282000	0.06212000
                     60	0.06177000	0.03600000	0.02807000	0.02595000	0.02432000	0.02581000	0.02767000	0.03629000	0.06177000
            </tableData>
          </table>
       </product>
    </function>
    <function name="aero/coefficients/CMMMN">
    <description>PITCHING MOMENT INCREMENT DUE TO MACH</description>
          <table>
            <independentVar lookup="row">velocities/mach</independentVar>
            <independentVar lookup="column">aero/alpha-deg</independentVar>
            <tableData>
                                -10	         -5	         -2	       0.01	          1	          2	          6	          7	         10
                    0.2	-0.06139000	-0.01541000	-0.00459000	-0.00115000	0.00038000	0.00185000	0.01225000	0.01858000	0.04101000
                    0.4	-0.03982000	-0.00999000	-0.00297000	-0.00074000	0.00026000	0.00121000	0.00810000	0.01225000	0.02697000
                    0.6	0.00000000	0.00000000	0.00000000	0.00000000	0.00000000	0.00000000	0.00000000	0.00000000	0.00000000
                    0.8	0.03949000	0.01265000	0.00376000	0.00080000	-0.00055000	-0.00180000	-0.01040000	-0.01459000	-0.03574000
                    0.9	0.03606000	0.01469000	0.00434000	0.00050000	-0.00095000	-0.00265000	-0.00995000	-0.01525000	-0.04842000
                   0.97	0.03488000	0.01852000	0.00528000	-0.00007000	-0.00183000	-0.00375000	-0.01315000	-0.02168000	-0.07663000
                   0.98	0.03383000	0.01970000	0.00549000	-0.00002000	-0.00205000	-0.00417000	-0.01401000	-0.02213000	-0.08630000
                   0.99	-0.38327000	-0.15331000	-0.06411000	-0.00018000	0.00525000	-0.00476000	-0.01651000	-0.02548000	-0.09857000
                    1.4	0.00206000	0.03899000	0.01321000	-0.01237000	-0.02634000	-0.04042000	-0.08859000	-0.09975000	-0.13212000
            </tableData>
          </table>
    </function>
    <function name="aero/coefficients/CMMQ">
    <description>PITCH DAMPING DERIVATIVE</description>
    <product>
          <property>aero/qb</property>
          <table>
            <independentVar lookup="row">aero/alpha-deg</independentVar>
            <tableData>
                    -20		-4.89843000
                    -10		-9.52030800
                      0		-5.73909540
                     10		-7.64393470
                     20		-1.67537810
                     30		-1.05734270
                     60		-1.03605770
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            </tableData>
          </table>
       </product>
    </function>
    <function name="aero/coefficients/CML1">
    <description>BASE ROLLING MOMENT</description>
          <table>
            <independentVar lookup="row">aero/alpha-deg</independentVar>
            <independentVar lookup="column">aero/beta-deg</independentVar>
            <tableData>
                                -20	        -10	         -5	         -2	          0	          2	          5	         10	         20
                    -20	-0.02565000	0.00132000	0.00209000	0.00078000	0.00000000	-0.00078000	-0.00209000	-0.00132000	0.02565000
                     -2	0.00915000	0.00471000	0.00187000	0.00075000	0.00000000	-0.00075000	-0.00187000	-0.00471000	-0.00915000
                      8	0.05833000	0.02537000	0.01128000	0.00357000	0.00000000	-0.00357000	-0.01128000	-0.02537000	-0.05833000
                     18	0.02393000	-0.00285000	-0.00516000	-0.00172000	0.00000000	0.00173000	0.00516000	0.00285000	-0.02393000
                     28	0.00006000	-0.00892000	-0.00242000	-0.00083000	0.00000000	0.00083000	0.00242000	0.00892000	-0.00006000
                     55	-0.02212000	-0.01468000	-0.00676000	-0.00266000	0.00000000	0.00266000	0.00676000	0.01468000	0.02211000
                     60	-0.02459000	-0.01613000	-0.00940000	-0.00316000	0.00000000	0.00316000	0.00940000	0.01613000	0.02459000
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            </tableData>
          </table>
    </function>
    <function name="aero/coefficients/CMLBETADOT">
    <description>ROLL MOMENT DERIVATIVE FOR BETA DOT</description>
    <product>
          <property>aero/betadot-rad_sec-limited</property>
          <table>
            <independentVar lookup="row">aero/alpha-deg</independentVar>
            <tableData>
                    -20		-0.01974320
                    -10		0.09717920
                      0		-0.04904980
                     10		-0.14074680
                     20		0.04432020
                     30		0.05477950
                     60		0.07002360
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            </tableData>
          </table>
       </product>
    </function>
    <function name="aero/coefficients/CMLDAD">
    <description>ROLLING MOMENT DUE TO AILERON DEFLECTION</description>
    <product>
          <property>fcs/aileron-pos-deg</property>
          <table>
            <independentVar lookup="row">aero/alpha-deg</independentVar>
            <independentVar lookup="column">aero/beta-deg</independentVar>
            <tableData>
                                -20	        -10	         -5	         -2	          0	          2	          5	         10	         20
                    -20	0.00118500	0.00047000	0.00033950	0.00030850	0.00029200	0.00028150	0.00025050	0.00020850	0.00010400
                     -2	0.00114550	0.00172750	0.00202500	0.00219950	0.00229700	0.00241050	0.00255850	0.00276600	0.00307550
                      8	0.00140950	0.00206300	0.00234250	0.00251250	0.00259550	0.00265300	0.00273650	0.00285900	0.00301400
                     18	0.00184950	0.00127800	0.00067400	0.00053050	0.00044800	0.00039900	0.00035350	0.00021650	-0.00009250
                     28	0.00022850	0.00012800	0.00009550	0.00009050	0.00007950	0.00007350	0.00006500	0.00001250	0.00000450
                     55	0.00003450	0.00002300	0.00001500	0.00002250	0.00002500	0.00001350	0.00002550	0.00001250	0.00003650
                     60	0.00001550	-0.00004050	-0.00000750	0.00001300	0.00001750	0.00002000	0.00004900	0.00004700	0.00003250
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            </tableData>
          </table>
       </product>
    </function>
    <function name="aero/coefficients/CMLDADMN">
    <description>ROLLING MOMENT DRAG CHANGE DUE TO MACH DUE TO AILERON DEFLECTION</description>
    <product>
          <property>fcs/aileron-pos-deg</property>
          <table>
            <independentVar lookup="row">velocities/mach</independentVar>
            <independentVar lookup="column">aero/alpha-deg</independentVar>
            <tableData>
                                -10	         -5	         -2	       0.01	          1	          2	          6	          7	         10
                    0.2	-0.00010300	-0.00029250	-0.00020750	-0.00018150	-0.00018450	-0.00019200	-0.00025550	-0.00027550	-0.00022150
                    0.4	-0.00000400	-0.00019300	-0.00013700	-0.00012000	-0.00012200	-0.00012650	-0.00016450	-0.00017700	-0.00012550
                    0.6	0.00000000	0.00000000	0.00000000	0.00000000	0.00000000	0.00000000	0.00000000	0.00000000	0.00000000
                    0.8	-0.00006900	0.00028400	0.00021450	0.00019700	0.00019100	0.00019350	0.00021800	0.00019350	0.00026700
                    0.9	0.00007600	0.00038750	0.00033100	0.00031150	0.00029900	0.00029750	0.00032450	0.00033750	0.00033900
                   0.97	0.00023350	0.00051850	0.00047650	0.00044950	0.00043550	0.00043600	0.00045900	0.00045200	0.00043350
                   0.98	0.00026800	0.00054200	0.00050750	0.00047900	0.00046500	0.00046550	0.00047650	0.00046550	0.00044100
                   0.99	0.00031450	0.00057300	0.00055650	0.00052600	0.00051200	0.00051650	0.00049800	0.00047750	0.00045100
                    1.4	-0.00096250	-0.00104600	-0.00090850	-0.00086400	-0.00086050	-0.00088750	-0.00111100	-0.00116650	-0.00124050
            </tableData>
          </table>
       </product>
    </function>
    <function name="aero/coefficients/CMLDRD">
    <description>ROLLING MOMENT DUE TO RUDDER DEFLECTION</description>
    <product>
          <property>fcs/rudder-pos-deg</property>
          <table>
            <independentVar lookup="row">aero/alpha-deg</independentVar>
            <independentVar lookup="column">aero/beta-deg</independentVar>
            <tableData>
                                -20	        -10	         -5	         -2	          0	          2	          5	         10	         20
                    -20	-0.00001350	0.00018850	0.00032650	0.00032700	0.00031100	0.00030650	0.00031000	0.00028800	0.00006550
                     -2	0.00001350	0.00017400	0.00016400	0.00014750	0.00014450	0.00013650	0.00014200	0.00017200	0.00010300
                      8	0.00006400	0.00007900	0.00005800	0.00003400	0.00002800	0.00002450	0.00003950	0.00005950	0.00011700
                     18	0.00006050	0.00001600	0.00002750	0.00001250	0.00000400	-0.00000450	0.00001600	0.00003000	0.00006700
                     28	0.00005750	-0.00004650	-0.00003400	-0.00003400	-0.00003600	-0.00003600	-0.00004050	-0.00005600	0.00005550
                     55	0.00000300	0.00000100	0.00000250	0.00000300	0.00000250	0.00000150	0.00000100	0.00000000	-0.00000050
                     60	0.00000550	0.00000700	0.00001550	0.00001350	0.00001250	0.00001250	0.00000850	0.00000400	0.00000150
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            </tableData>
          </table>
       </product>
    </function>
    <function name="aero/coefficients/CMLDRDMN">
    <description>ROLLING MOMENT DRAG CHANGE DUE TO MACH DUE TO RUDDER DEFLECTION</description>
    <product>
          <property>fcs/rudder-pos-deg</property>
          <table>
            <independentVar lookup="row">velocities/mach</independentVar>
            <independentVar lookup="column">aero/alpha-deg</independentVar>
            <tableData>
                                -10	         -5	         -2	       0.01	          1	          2	          6	          7	         10
                    0.2	0.00000700	-0.00000550	-0.00000950	-0.00001100	-0.00001050	-0.00001000	0.00000150	0.00000650	0.00001300
                    0.4	0.00000450	-0.00000350	-0.00000650	-0.00000700	-0.00000700	-0.00000650	0.00000100	0.00000400	0.00000800
                    0.6	0.00000000	0.00000000	0.00000000	0.00000000	0.00000000	0.00000000	0.00000000	0.00000000	0.00000000
                    0.8	0.00001200	0.00000900	0.00001200	0.00001150	0.00001150	0.00001050	0.00000100	-0.00000400	-0.00000300
                    0.9	0.00003050	0.00002100	0.00002100	0.00002000	0.00001900	0.00001650	0.00000450	-0.00000200	0.00000200
                   0.97	0.00005200	0.00003600	0.00003150	0.00003000	0.00002750	0.00002350	0.00000350	-0.00000250	0.00000500
                   0.98	0.00005650	0.00003900	0.00003400	0.00003200	0.00002900	0.00002500	0.00000150	-0.00000650	0.00000450
                   0.99	0.00006150	0.00004250	0.00003700	0.00003450	0.00003150	0.00002600	-0.00000300	-0.00001050	0.00000200
                    1.4	-0.00002150	-0.00001100	-0.00000950	-0.00000600	0.00000650	0.00000000	0.00003000	0.00004400	0.00006900
            </tableData>
          </table>
       </product>
    </function>
    <function name="aero/coefficients/CMLFLAPS">
    <description>ROLLING MOMENT INCREMENT DUE TO FLAPS</description>
          <table>
            <independentVar lookup="row">aero/alpha-deg</independentVar>
            <independentVar lookup="column">aero/beta-deg</independentVar>
            <independentVar lookup="table">fcs/flap-pos-deg</independentVar>
              <tableData breakPoint="0">
                              -20	       -10	        -5	        -2	         0	         2	         5	        10	        20
                    -20	0.00000000	0.00000000	0.00000000	0.00000000	0.00000000	0.00000000	0.00000000	0.00000000	0.00000000
                     -2	0.00000000	0.00000000	0.00000000	0.00000000	0.00000000	0.00000000	0.00000000	0.00000000	0.00000000
                      8	0.00000000	0.00000000	0.00000000	0.00000000	0.00000000	0.00000000	0.00000000	0.00000000	0.00000000
                     18	0.00000000	0.00000000	0.00000000	0.00000000	0.00000000	0.00000000	0.00000000	0.00000000	0.00000000
                     28	0.00000000	0.00000000	0.00000000	0.00000000	0.00000000	0.00000000	0.00000000	0.00000000	0.00000000
                     55	0.00000000	0.00000000	0.00000000	0.00000000	0.00000000	0.00000000	0.00000000	0.00000000	0.00000000
                     60	0.00000000	0.00000000	0.00000000	0.00000000	0.00000000	0.00000000	0.00000000	0.00000000	0.00000000
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              </tableData>
              <tableData breakPoint="45">
                              -20	       -10	        -5	        -2	         0	         2	         5	        10	        20
                    -20	0.00403000	0.00643000	0.00376000	0.00151000	0.00000000	-0.00151000	-0.00376000	-0.00643000	-0.00403000
                     -2	-0.02610000	-0.01042000	-0.00418000	-0.00218000	0.00000000	0.00218000	0.00418000	0.01042000	0.02610000
                      8	-0.01469000	-0.00386000	0.00077000	-0.00003000	0.00000000	0.00003000	-0.00077000	0.00386000	0.01469000
                     18	0.01981000	0.00796000	0.00612000	0.00086000	0.00000000	-0.00085000	-0.00612000	-0.00796000	-0.01981000
                     28	0.00031000	0.00499000	-0.00128000	-0.00049000	0.00000000	0.00049000	0.00128000	-0.00499000	-0.00031000
                     55	-0.00222000	-0.00182000	-0.00081000	-0.00041000	0.00000000	0.00041000	0.00081000	0.00182000	0.00221000
                     60	-0.00167000	0.00214000	0.00145000	0.00034000	0.00000000	-0.00034000	-0.00145000	-0.00214000	0.00167000
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              </tableData>
          </table>
    </function>
    <function name="aero/coefficients/CMLGEAR">
    <description>ROLLING MOMENT INCREMENT DUE TO GEAR</description>
    <product>
          <property>gear/gear-pos-norm</property>
          <table>
            <independentVar lookup="row">aero/alpha-deg</independentVar>
            <independentVar lookup="column">aero/beta-deg</independentVar>
            <tableData>
                                -20	        -10	         -5	         -2	          0	          2	          5	         10	         20
                    -20	0.00443000	0.00760000	0.00477000	0.00179000	0.00000000	-0.00178000	-0.00469000	-0.00747000	-0.00433000
                     -2	-0.00095000	0.00137000	0.00130000	0.00051000	0.00001000	-0.00049000	-0.00128000	-0.00135000	0.00098000
                      8	0.00290000	0.00418000	0.00236000	0.00055000	-0.00023000	-0.00105000	-0.00281000	-0.00454000	-0.00319000
                     18	0.01334000	0.00773000	0.00163000	-0.00002000	-0.00002000	-0.00004000	-0.00174000	-0.00777000	-0.01327000
                     28	0.00642000	0.00591000	0.00208000	0.00062000	0.00001000	-0.00051000	-0.00214000	-0.00596000	-0.00635000
                     55	0.00477000	0.00160000	0.00021000	-0.00037000	-0.00006000	0.00027000	-0.00030000	-0.00169000	-0.00512000
                     60	0.00446000	0.00262000	0.00066000	-0.00021000	-0.00012000	0.00010000	-0.00079000	-0.00263000	-0.00454000
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            </tableData>
          </table>
       </product>
    </function>
    <function name="aero/coefficients/CMLMN">
    <description>ROLLING MOMENT INCREMENT DUE TO MACH</description>
          <table>
            <independentVar lookup="row">velocities/mach</independentVar>
            <independentVar lookup="column">aero/alpha-deg</independentVar>
            <tableData>
                                -10	         -5	         -2	       0.01	          1	          2	          6	          7	         10
                    0.2	0.00000000	0.00000000	0.00000000	0.00000000	0.00000000	0.00000000	0.00000000	0.00000000	0.00000000
                    0.4	0.00000000	0.00000000	0.00000000	0.00000000	0.00000000	0.00000000	0.00000000	0.00000000	0.00000000
                    0.6	0.00000000	0.00000000	0.00000000	0.00000000	0.00000000	0.00000000	0.00000000	0.00000000	0.00000000
                    0.8	0.00000000	0.00000000	0.00000000	0.00000000	0.00000000	0.00000000	0.00000000	0.00000000	0.00000000
                    0.9	0.00000000	0.00000000	0.00000000	0.00000000	0.00000000	0.00000000	0.00000000	0.00000000	0.00000000
                   0.97	0.00000000	0.00000000	0.00000000	0.00000000	0.00000000	0.00000000	0.00000000	0.00000000	0.00000000
                   0.98	0.00000000	0.00000000	0.00000000	0.00000000	0.00000000	0.00000000	0.00000000	0.00000000	0.00000000
                   0.99	0.00000000	0.00000000	0.00000000	0.00000000	0.00000000	0.00000000	0.00000000	0.00000000	0.00000000
                    1.4	-0.00044000	-0.00037000	-0.00038000	0.00000000	0.00015000	0.00016000	0.00005000	0.00019000	0.00022000
            </tableData>
          </table>
    </function>
    <function name="aero/coefficients/CMLP">
    <description>ROLL DAMPING DERIVATIVE</description>
    <product>
          <property>aero/pb</property>
          <table>
            <independentVar lookup="row">aero/alpha-deg</independentVar>
            <tableData>
                    -20		-0.04164360
                    -10		-0.80238900
                      0		-0.51761330
                     10		-0.78148540
                     20		-0.03797580
                     30		0.02219720
                     60		-0.01234860
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            </tableData>
          </table>
       </product>
    </function>
    <function name="aero/coefficients/CMLR">
    <description>ROLLING MOMENT DUE TO YAW RATE</description>
    <product>
          <property>aero/rb</property>
          <table>
            <independentVar lookup="row">aero/alpha-deg</independentVar>
            <tableData>
                    -20		-0.01086170
                    -10		-0.15902950
                      0		0.07905790
                     10		0.30750080
                     20		0.07751080
                     30		0.05182060
                     60		0.13497140
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            </tableData>
          </table>
       </product>
    </function>
    <function name="aero/coefficients/CFYB">
    <description>BASE SIDEFORCE</description>
          <table>
            <independentVar lookup="row">aero/alpha-deg</independentVar>
            <independentVar lookup="column">aero/beta-deg</independentVar>
            <independentVar lookup="table">fcs/elevator-pos-deg</independentVar>
              <tableData breakPoint="-30">
                              -20	       -10	        -5	        -2	         0	         2	         5	        10	        20
                    -20	0.02870000	0.01919000	-0.00643000	-0.00420000	0.00000000	0.00420000	0.00643000	-0.01919000	-0.02870000
                     -2	0.09439000	0.05343000	0.01849000	0.00285000	0.00000000	-0.00285000	-0.01849000	-0.05343000	-0.09439000
                      8	0.10579000	0.00419000	0.00254000	-0.00380000	0.00000000	0.00381000	-0.00254000	-0.00419000	-0.10579000
                     18	0.11455000	0.00921000	0.01836000	0.00325000	0.00005000	-0.00325000	-0.01836000	-0.00921000	-0.11455000
                     28	0.08847000	0.04301000	0.01588000	0.00614000	0.00000000	-0.00614000	-0.01588000	-0.04301000	-0.08847000
                     55	-0.19609000	-0.13078000	-0.06601000	-0.01951000	0.00001000	0.01951000	0.06601000	0.13078000	0.19609000
                     60	-0.23157000	-0.15106000	-0.05687000	-0.02173000	0.00001000	0.02173000	0.05687000	0.15106000	0.23157000
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              </tableData>
              <tableData breakPoint="0">
                              -20	       -10	        -5	        -2	         0	         2	         5	        10	        20
                    -20	0.03836000	0.02368000	-0.00291000	-0.00289000	0.00000000	0.00289000	0.00291000	-0.02367000	-0.03836000
                     -2	0.09172000	0.04252000	0.01672000	0.00763000	0.00000000	-0.00763000	-0.01672000	-0.04252000	-0.09172000
                      8	0.10154000	0.04013000	0.01932000	0.00311000	0.00000000	-0.00311000	-0.01932000	-0.04013000	-0.10154000
                     18	0.11930000	0.02387000	0.02390000	0.00629000	0.00000000	-0.00629000	-0.02390000	-0.02387000	-0.11930000
                     28	0.09142000	0.04554000	0.01563000	0.00544000	0.00000000	-0.00544000	-0.01564000	-0.04554000	-0.09142000
                     55	-0.19679000	-0.13109000	-0.06612000	-0.01936000	0.00001000	0.01936000	0.06612000	0.13109000	0.19679000
                     60	-0.23222000	-0.15157000	-0.05725000	-0.02203000	0.00001000	0.02203000	0.05725000	0.15157000	0.23222000
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              </tableData>
              <tableData breakPoint="30">
                              -20	       -10	        -5	        -2	         0	         2	         5	        10	        20
                    -20	0.04953000	0.02663000	-0.00130000	-0.00237000	0.00000000	0.00237000	0.00129000	-0.02663000	-0.04953000
                     -2	0.09766000	0.03430000	0.01086000	0.00903000	0.00000000	-0.00903000	-0.01086000	-0.03430000	-0.09766000
                      8	0.09936000	0.07608000	0.03221000	0.01030000	0.00000000	-0.01030000	-0.03221000	-0.07608000	-0.09936000
                     18	0.12645000	0.04699000	0.02685000	0.00894000	0.00000000	-0.00894000	-0.02685000	-0.04699000	-0.12645000
                     28	0.10373000	0.05934000	0.02415000	0.00871000	0.00000000	-0.00871000	-0.02415000	-0.05934000	-0.10373000
                     55	-0.19924000	-0.13213000	-0.06644000	-0.01917000	0.00001000	0.01917000	0.06644000	0.13213000	0.19896000
                     60	-0.23442000	-0.15258000	-0.05735000	-0.02198000	0.00001000	0.02197000	0.05735000	0.15258000	0.23442000
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              </tableData>
          </table>
    </function>
    <function name="aero/coefficients/CFYFLAPS">
    <description>SIDEFORCE INCREMENT DUE TO FLAPS</description>
          <table>
            <independentVar lookup="row">aero/alpha-deg</independentVar>
            <independentVar lookup="column">fcs/flap-pos-deg</independentVar>
            <tableData>
                                  0	         45
                    -20	0.00000000	0.00000000
                     -2	0.00000000	0.00000000
                      8	0.00000000	0.00000000
                     18	0.00000000	-0.00002000
                     28	0.00000000	0.00000000
                     55	0.00000000	0.00000000
                     60	0.00000000	0.00000000
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            </tableData>
          </table>
    </function>
    <function name="aero/coefficients/CFYGEAR">
    <description>SIDEFORCE INCREMENT DUE TO GEAR</description>
    <product>
          <property>gear/gear-pos-norm</property>
          <table>
            <independentVar lookup="row">aero/alpha-deg</independentVar>
            <independentVar lookup="column">aero/beta-deg</independentVar>
            <tableData>
                                -20	        -10	         -5	         -2	          0	          2	          5	         10	         20
                    -20	0.04595000	0.03880000	0.02515000	0.00999000	0.00007000	-0.00981000	-0.02490000	-0.03850000	-0.04583000
                     -2	0.04194000	0.03634000	0.02195000	0.00870000	0.00000000	-0.00873000	-0.02195000	-0.03631000	-0.04195000
                      8	0.02938000	0.03423000	0.01589000	0.00600000	0.00010000	-0.00593000	-0.01602000	-0.03418000	-0.02944000
                     18	0.01687000	-0.00051000	-0.02461000	-0.01856000	0.00002000	0.01851000	0.02453000	0.00049000	-0.01670000
                     28	0.02049000	-0.02110000	-0.01988000	-0.01316000	0.00043000	0.01373000	0.02008000	0.02144000	-0.02062000
                     55	-0.04529000	-0.03316000	-0.01585000	-0.00525000	0.00064000	0.00648000	0.01711000	0.03437000	0.04618000
                     60	-0.04479000	-0.02966000	-0.01564000	-0.00606000	-0.00005000	0.00608000	0.01659000	0.03112000	0.04548000
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            </tableData>
          </table>
       </product>
    </function>
    <function name="aero/coefficients/CFYMN">
    <description>SIDEFORCE INCREMENT DUE TO MACH</description>
          <table>
            <independentVar lookup="row">velocities/mach</independentVar>
            <independentVar lookup="column">aero/alpha-deg</independentVar>
            <tableData>
                                -10	         -5	         -2	       0.01	          1	          2	          6	          7	         10
                    0.2	0.00000000	0.00000000	0.00000000	0.00000000	0.00000000	0.00000000	0.00000000	0.00000000	0.00000000
                    0.4	0.00000000	0.00000000	0.00000000	0.00000000	0.00000000	0.00000000	0.00000000	0.00000000	0.00000000
                    0.6	0.00000000	0.00000000	0.00000000	0.00000000	0.00000000	0.00000000	0.00000000	0.00000000	0.00000000
                    0.8	0.00000000	0.00000000	0.00000000	0.00000000	0.00000000	0.00000000	0.00000000	0.00000000	0.00000000
                    0.9	0.00000000	0.00000000	0.00000000	0.00000000	0.00000000	0.00000000	0.00000000	0.00000000	0.00000000
                   0.97	0.00000000	0.00000000	0.00000000	0.00000000	0.00000000	0.00000000	0.00000000	0.00002000	0.00000000
                   0.98	0.00000000	0.00000000	0.00000000	0.00000000	0.00000000	0.00000000	0.00000000	0.00000000	0.00000000
                   0.99	0.00000000	0.00000000	0.00000000	0.00000000	0.00000000	0.00000000	0.00000000	0.00000000	0.00000000
                    1.4	0.00106000	0.00039000	-0.00001000	0.00002000	0.00006000	0.00012000	0.00067000	0.00045000	0.00136000
            </tableData>
          </table>
    </function>
    <function name="aero/coefficients/CFYP">
    <description>SIDE FORCE DUE TO ROLL RATE</description>
    <product>
          <property>aero/pb</property>
          <table>
            <independentVar lookup="row">aero/alpha-deg</independentVar>
            <tableData>
                    -20		-0.29475200
                    -10		-0.48270760
                      0		0.00600870
                     10		0.45078740
                     20		0.39724240
                     30		0.48288400
                     60		0.58615210
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            </tableData>
          </table>
       </product>
    </function>
    <function name="aero/coefficients/CFYR">
    <description>SIDE FORCE DUE TO YAW RATE</description>
    <product>
          <property>aero/rb</property>
          <table>
            <independentVar lookup="row">aero/alpha-deg</independentVar>
            <tableData>
                    -20		0.50052060
                    -10		0.26356210
                      0		0.32640370
                     10		0.37279570
                     20		0.52489130
                     30		0.41155520
                     60		0.28871490
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            </tableData>
          </table>
       </product>
    </function>
    <function name="aero/coefficients/CYDAD">
    <description>SIDE FORCE DUE TO AILERON DEFLECTION</description>
    <product>
          <property>fcs/aileron-pos-deg</property>
          <table>
            <independentVar lookup="row">aero/alpha-deg</independentVar>
            <independentVar lookup="column">aero/beta-deg</independentVar>
            <tableData>
                                -20	        -10	         -5	         -2	          0	          2	          5	         10	         20
                    -20	-0.00074550	-0.00126450	-0.00123850	-0.00111550	-0.00104250	-0.00097850	-0.00093450	-0.00088250	-0.00068350
                     -2	-0.00016650	-0.00025700	-0.00040100	-0.00030600	-0.00022800	-0.00020300	-0.00016100	-0.00016900	0.00000800
                      8	-0.00028600	-0.00006700	-0.00012600	-0.00012500	-0.00014600	-0.00022050	-0.00021450	-0.00024450	0.00004350
                     18	0.00006450	0.00105250	0.00138850	0.00133650	0.00137200	0.00132800	0.00132800	0.00121800	0.00137300
                     28	0.00130700	0.00110650	0.00097250	0.00090700	0.00088000	0.00086300	0.00075200	0.00087200	0.00087000
                     55	0.00038900	0.00030200	0.00018450	0.00016400	0.00014550	0.00011550	-0.00002000	-0.00008250	0.00014400
                     60	0.00036450	0.00038350	0.00013650	0.00015650	0.00009950	0.00004000	-0.00006550	-0.00022100	0.00003900
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            </tableData>
          </table>
       </product>
    </function>
    <function name="aero/coefficients/CYDADMN">
    <description>SIDEFORCE CHANGE DUE TO MACH DUE TO TO AILERON DEFLECTION</description>
    <product>
          <property>fcs/aileron-pos-deg</property>
          <table>
            <independentVar lookup="row">velocities/mach</independentVar>
            <independentVar lookup="column">aero/alpha-deg</independentVar>
            <tableData>
                                -10	         -5	         -2	       0.01	          1	          2	          6	          7	         10
                    0.2	0.00024650	0.00008750	0.00006100	0.00003900	0.00002650	0.00001450	-0.00002550	-0.00003650	-0.00013250
                    0.4	0.00017000	0.00005850	0.00004000	0.00002550	0.00001700	0.00000900	-0.00001900	-0.00002700	-0.00009650
                    0.6	0.00000000	0.00000000	0.00000000	0.00000000	0.00000000	0.00000000	0.00000000	0.00000000	0.00000000
                    0.8	-0.00023100	-0.00009800	-0.00006650	-0.00004000	-0.00002350	-0.00000850	0.00004300	0.00005950	0.00018400
                    0.9	-0.00029550	-0.00014600	-0.00010650	-0.00006000	-0.00003150	-0.00000750	0.00006000	0.00007250	0.00021050
                   0.97	-0.00023250	-0.00015750	-0.00013300	-0.00006700	-0.00002700	0.00000250	0.00006300	0.00006700	0.00014200
                   0.98	-0.00016950	-0.00014450	-0.00013400	-0.00006600	-0.00002400	0.00000600	0.00005350	0.00005700	0.00008500
                   0.99	-0.00002200	-0.00010800	-0.00013150	-0.00006300	-0.00001900	0.00001050	0.00003950	0.00002400	-0.00002500
                    1.4	-0.00021400	-0.00034900	-0.00022750	-0.00015650	-0.00012500	-0.00008600	0.00011550	0.00017150	0.00015650
            </tableData>
          </table>
       </product>
    </function>
    <function name="aero/coefficients/CYDRD">
    <description>SIDE FORCE DUE TO RUDDER DEFLECTION</description>
    <product>
          <property>fcs/rudder-pos-deg</property>
          <table>
            <independentVar lookup="row">aero/alpha-deg</independentVar>
            <independentVar lookup="column">aero/beta-deg</independentVar>
            <tableData>
                                -20	        -10	         -5	         -2	          0	          2	          5	         10	         20
                    -20	0.00035600	0.00155200	0.00189300	0.00178950	0.00173750	0.00171450	0.00178100	0.00189200	0.00114850
                     -2	0.00072400	0.00182400	0.00163850	0.00156050	0.00164050	0.00152200	0.00155800	0.00184250	0.00148900
                      8	0.00101400	0.00159700	0.00157100	0.00161650	0.00148450	0.00158600	0.00152200	0.00158250	0.00144950
                     18	0.00079650	0.00058050	0.00103600	0.00086750	0.00084050	0.00088650	0.00101950	0.00105300	0.00101750
                     28	0.00083450	0.00052900	0.00017500	0.00033300	0.00030050	0.00032550	0.00031950	0.00059250	0.00100400
                     55	-0.00005400	-0.00001400	0.00000550	-0.00000750	-0.00000800	-0.00000450	0.00000100	0.00000250	0.00003800
                     60	-0.00011150	-0.00000750	0.00004950	-0.00002550	-0.00002900	-0.00003650	0.00002250	-0.00000400	-0.00003250
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            </tableData>
          </table>
       </product>
    </function>
    <function name="aero/coefficients/CYDRDMN">
    <description>SIDEFORCE CHANGE DUE TO MACH DUE TO TO RUDDER DEFLECTION</description>
    <product>
          <property>fcs/rudder-pos-deg</property>
          <table>
            <independentVar lookup="row">velocities/mach</independentVar>
            <independentVar lookup="column">aero/alpha-deg</independentVar>
            <tableData>
                                -10	         -5	         -2	       0.01	          1	          2	          6	          7	         10
                    0.2	-0.00009550	-0.00010850	-0.00011500	-0.00011750	-0.00012100	-0.00012650	-0.00014550	-0.00013550	-0.00005850
                    0.4	-0.00006350	-0.00007200	-0.00007600	-0.00007700	-0.00008000	-0.00008350	-0.00009550	-0.00008900	-0.00004100
                    0.6	0.00000000	0.00000000	0.00000000	0.00000000	0.00000000	0.00000000	0.00000000	0.00000000	0.00000000
                    0.8	0.00012600	0.00012550	0.00012900	0.00013050	0.00013450	0.00014050	0.00016250	0.00014450	0.00010900
                    0.9	0.00024100	0.00022000	0.00021950	0.00022100	0.00022700	0.00024100	0.00027500	0.00024550	0.00019950
                   0.97	0.00040050	0.00035650	0.00034250	0.00034500	0.00035700	0.00037850	0.00042450	0.00038050	0.00028550
                   0.98	0.00043800	0.00039100	0.00037350	0.00037650	0.00038950	0.00041400	0.00046250	0.00041750	0.00028000
                   0.99	0.00047750	0.00043600	0.00041550	0.00042050	0.00043350	0.00046600	0.00051750	0.00046800	0.00025250
                    1.4	-0.00025450	-0.00030900	-0.00034550	-0.00037250	-0.00039600	-0.00042750	-0.00054600	-0.00051800	-0.00010250
            </tableData>
          </table>
       </product>
    </function>
    <function name="aero/coefficients/CMN1">
    <description>BASE YAWING MOMENT</description>
          <table>
            <independentVar lookup="row">aero/alpha-deg</independentVar>
            <independentVar lookup="column">aero/beta-deg</independentVar>
            <independentVar lookup="table">fcs/elevator-pos-deg</independentVar>
              <tableData breakPoint="-30">
                              -20	       -10	        -5	        -2	         0	         2	         5	        10	        20
                    -20	0.00776000	0.00565000	-0.00128000	-0.00095000	0.00000000	0.00095000	0.00128000	-0.00565000	-0.00776000
                     -2	-0.01418000	-0.01225000	-0.01117000	-0.00474000	0.00000000	0.00474000	0.01117000	0.01225000	0.01418000
                      8	0.00186000	-0.02562000	-0.01818000	-0.01022000	0.00000000	0.01022000	0.01818000	0.02562000	-0.00186000
                     18	0.02315000	-0.01540000	0.00014000	-0.00161000	0.00003000	0.00161000	-0.00014000	0.01540000	-0.02315000
                     28	0.02697000	0.00326000	0.00297000	0.00210000	0.00000000	-0.00210000	-0.00297000	-0.00326000	-0.02697000
                     55	-0.00602000	-0.02246000	-0.01077000	-0.00167000	0.00000000	0.00167000	0.01077000	0.02246000	0.00602000
                     60	-0.00123000	-0.02069000	-0.00275000	0.00020000	0.00000000	-0.00020000	0.00274000	0.02069000	0.00123000
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              </tableData>
              <tableData breakPoint="0">
                              -20	       -10	        -5	        -2	         0	         2	         5	        10	        20
                    -20	0.01853000	0.01139000	0.00227000	0.00043000	0.00000000	-0.00043000	-0.00227000	-0.01139000	-0.01853000
                     -2	-0.01942000	-0.01210000	-0.00820000	-0.00371000	0.00000000	0.00371000	0.00820000	0.01210000	0.01942000
                      8	-0.00558000	-0.01229000	-0.01046000	-0.00848000	0.00000000	0.00848000	0.01046000	0.01229000	0.00558000
                     18	0.02257000	-0.01053000	0.00218000	-0.00004000	0.00000000	0.00004000	-0.00218000	0.01053000	-0.02257000
                     28	0.02694000	0.00407000	0.00248000	0.00146000	0.00000000	-0.00146000	-0.00248000	-0.00407000	-0.02694000
                     55	-0.00595000	-0.02228000	-0.01061000	-0.00147000	0.00000000	0.00147000	0.01061000	0.02228000	0.00595000
                     60	-0.00124000	-0.02069000	-0.00277000	0.00018000	0.00000000	-0.00018000	0.00277000	0.02069000	0.00124000
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              </tableData>
              <tableData breakPoint="30">
                              -20	       -10	        -5	        -2	         0	         2	         5	        10	        20
                    -20	0.03035000	0.01501000	0.00403000	0.00108000	0.00000000	-0.00108000	-0.00403000	-0.01501000	-0.03035000
                     -2	-0.00927000	-0.00617000	-0.00635000	-0.00356000	0.00000000	0.00356000	0.00635000	0.00617000	0.00927000
                      8	-0.00203000	0.00591000	-0.00275000	-0.00475000	0.00000000	0.00475000	0.00275000	-0.00591000	0.00203000
                     18	0.02713000	0.00268000	0.00289000	0.00099000	0.00000000	-0.00099000	-0.00289000	-0.00268000	-0.02713000
                     28	0.03243000	0.01409000	0.00935000	0.00423000	0.00000000	-0.00423000	-0.00935000	-0.01409000	-0.03243000
                     55	-0.00575000	-0.02179000	-0.01014000	-0.00102000	0.00000000	0.00102000	0.01014000	0.02179000	0.00566000
                     60	-0.00079000	-0.02029000	-0.00240000	0.00043000	0.00000000	-0.00043000	0.00240000	0.02029000	0.00078000
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              </tableData>
          </table>
    </function>
    <function name="aero/coefficients/CMNBETADOT">
    <description>YAW MOMENT DERIVATIVE FOR BETADOT</description>
    <product>
          <property>aero/betadot-rad_sec-limited</property>
          <table>
            <independentVar lookup="row">aero/alpha-deg</independentVar>
            <tableData>
                    -20		0.00583970
                    -10		0.06186870
                      0		0.10160680
                     10		0.12494800
                     20		-0.06840420
                     30		-0.22454800
                     60		0.05220230
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            </tableData>
          </table>
       </product>
    </function>
    <function name="aero/coefficients/CMNDAD">
    <description>YAWING MOMENT DUE TO AILERON DEFLECTION</description>
    <product>
          <property>fcs/aileron-pos-deg</property>
          <table>
            <independentVar lookup="row">aero/alpha-deg</independentVar>
            <independentVar lookup="column">aero/beta-deg</independentVar>
            <tableData>
                                -20	        -10	         -5	         -2	          0	          2	          5	         10	         20
                    -20	-0.00003050	0.00026650	0.00027450	0.00023350	0.00021550	0.00020600	0.00020000	0.00018400	0.00009500
                     -2	0.00007200	0.00020850	0.00016000	0.00023300	0.00021550	0.00026100	0.00025200	0.00024450	0.00014050
                      8	0.00033050	0.00030350	0.00033250	0.00033400	0.00037250	0.00043150	0.00045200	0.00046100	0.00021800
                     18	0.00043250	0.00009100	-0.00000200	0.00007300	0.00005000	0.00007000	0.00007000	0.00011150	0.00004100
                     28	-0.00007850	-0.00006300	0.00000500	0.00002300	0.00004850	0.00005550	0.00013100	0.00014650	0.00013550
                     55	0.00002950	0.00006350	0.00011800	0.00011750	0.00012350	0.00014400	0.00021100	0.00022950	0.00009100
                     60	0.00002400	0.00003800	0.00011950	0.00010050	0.00011350	0.00013350	0.00019300	0.00025000	0.00008650
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            </tableData>
          </table>
       </product>
    </function>
    <function name="aero/coefficients/CMNDADMN">
    <description>YAWING MOMENT DRAG CHANGE DUE TO MACH DUE TO AILERON DEFLECTION</description>
    <product>
          <property>fcs/aileron-pos-deg</property>
          <table>
            <independentVar lookup="row">velocities/mach</independentVar>
            <independentVar lookup="column">aero/alpha-deg</independentVar>
            <tableData>
                                -10	         -5	         -2	       0.01	          1	          2	          6	          7	         10
                    0.2	-0.00013900	-0.00011100	-0.00007500	-0.00005400	-0.00004850	-0.00004300	-0.00002750	-0.00002300	-0.00000100
                    0.4	-0.00009550	-0.00007500	-0.00005000	-0.00003600	-0.00003250	-0.00002900	-0.00001900	-0.00001550	-0.00000050
                    0.6	0.00000000	0.00000000	0.00000000	0.00000000	0.00000000	0.00000000	0.00000000	0.00000000	0.00000000
                    0.8	0.00014750	0.00013650	0.00009000	0.00006850	0.00006100	0.00005500	0.00003750	0.00003400	-0.00002100
                    0.9	0.00023650	0.00022250	0.00015750	0.00012300	0.00010900	0.00009800	0.00006550	0.00005850	-0.00000200
                   0.97	0.00025200	0.00029700	0.00023250	0.00018650	0.00016700	0.00015200	0.00010800	0.00010350	0.00007750
                   0.98	0.00022400	0.00030400	0.00024750	0.00020050	0.00018050	0.00016350	0.00012450	0.00011900	0.00011700
                   0.99	0.00014650	0.00030000	0.00026800	0.00022050	0.00019900	0.00018150	0.00014650	0.00015150	0.00019200
                    1.4	0.00052900	0.00037350	0.00030650	0.00025650	0.00022200	0.00017650	-0.00003100	-0.00009950	-0.00019250
            </tableData>
          </table>
       </product>
    </function>
    <function name="aero/coefficients/CMNDRD">
    <description>YAWING MOMENT DUE TO RUDDER DEFLECTION</description>
    <product>
          <property>fcs/rudder-pos-deg</property>
          <table>
            <independentVar lookup="row">aero/alpha-deg</independentVar>
            <independentVar lookup="column">aero/beta-deg</independentVar>
            <tableData>
                                -20	        -10	         -5	         -2	          0	          2	          5	         10	         20
                    -20	0.00725000	0.02237000	0.02641000	0.02461000	0.02361000	0.02316000	0.02429000	0.02651000	0.01692000
                     -2	0.01092000	0.02522000	0.02344000	0.02276000	0.02229000	0.02184000	0.02186000	0.02487000	0.02083000
                      8	0.01504000	0.02191000	0.02033000	0.01899000	0.01859000	0.01841000	0.01928000	0.02098000	0.02077000
                     18	0.01193000	0.00763000	0.01524000	0.01494000	0.01482000	0.01540000	0.01482000	0.01390000	0.01427000
                     28	0.01141000	0.00561000	0.00332000	0.00569000	0.00529000	0.00556000	0.00508000	0.00610000	0.01364000
                     55	-0.00077000	-0.00021000	0.00005000	-0.00009000	-0.00009000	-0.00006000	0.00001000	0.00004000	0.00043000
                     60	-0.00162000	-0.00012000	0.00063000	-0.00026000	-0.00031000	-0.00031000	0.00027000	-0.00007000	-0.00046000
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            </tableData>
          </table>
       </product>
    </function>
    <function name="aero/coefficients/CMNDRDMN">
    <description>YAWING MOMENT DRAG CHANGE DUE TO MACH DUE TO RUDDER DEFLECTION</description>
    <product>
          <property>fcs/rudder-pos-deg</property>
          <table>
            <independentVar lookup="row">velocities/mach</independentVar>
            <independentVar lookup="column">aero/alpha-deg</independentVar>
            <tableData>
                                -10	         -5	         -2	       0.01	          1	          2	          6	          7	         10
                    0.2	0.00008300	0.00009000	0.00009250	0.00009200	0.00009150	0.00009000	0.00008450	0.00008100	0.00007450
                    0.4	0.00005450	0.00005950	0.00006100	0.00006000	0.00006050	0.00005950	0.00005600	0.00005350	0.00005050
                    0.6	0.00000000	0.00000000	0.00000000	0.00000000	0.00000000	0.00000000	0.00000000	0.00000000	0.00000000
                    0.8	-0.00010550	-0.00010350	-0.00010500	-0.00010350	-0.00010350	-0.00010200	-0.00009800	-0.00009250	-0.00011800
                    0.9	-0.00019850	-0.00018300	-0.00018100	-0.00017800	-0.00017800	-0.00017650	-0.00017350	-0.00016500	-0.00023450
                   0.97	-0.00031950	-0.00029100	-0.00028150	-0.00027850	-0.00028050	-0.00027850	-0.00028450	-0.00028000	-0.00040100
                   0.98	-0.00034600	-0.00031700	-0.00030600	-0.00030350	-0.00030550	-0.00030400	-0.00031600	-0.00031750	-0.00044300
                   0.99	-0.00037050	-0.00035100	-0.00033800	-0.00033800	-0.00033950	-0.00033950	-0.00036700	-0.00037800	-0.00049800
                    1.4	0.00002600	0.00007850	0.00011800	0.00014300	0.00015800	0.00016550	0.00019900	0.00021300	0.00013550
            </tableData>
          </table>
       </product>
    </function>
    <function name="aero/coefficients/CMNFLAPS">
    <description>YAWING MOMENT INCREMENT DUE TO FLAPS</description>
          <table>
            <independentVar lookup="row">aero/alpha-deg</independentVar>
            <independentVar lookup="column">aero/beta-deg</independentVar>
            <independentVar lookup="table">fcs/flap-pos-deg</independentVar>
              <tableData breakPoint="0">
                              -20	       -10	        -5	        -2	         0	         2	         5	        10	        20
                    -20	0.00000000	0.00000000	0.00000000	0.00000000	0.00000000	0.00000000	0.00000000	0.00000000	0.00000000
                     -2	0.00000000	0.00000000	0.00000000	0.00000000	0.00000000	0.00000000	0.00000000	0.00000000	0.00000000
                      8	0.00000000	0.00000000	0.00000000	0.00000000	0.00000000	0.00000000	0.00000000	0.00000000	0.00000000
                     18	0.00000000	0.00000000	0.00000000	0.00000000	0.00000000	0.00000000	0.00000000	0.00000000	0.00000000
                     28	0.00000000	0.00000000	0.00000000	0.00000000	0.00000000	0.00000000	0.00000000	0.00000000	0.00000000
                     55	0.00000000	0.00000000	0.00000000	0.00000000	0.00000000	0.00000000	0.00000000	0.00000000	0.00000000
                     60	0.00000000	0.00000000	0.00000000	0.00000000	0.00000000	0.00000000	0.00000000	0.00000000	0.00000000
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              </tableData>
              <tableData breakPoint="45">
                              -20	       -10	        -5	        -2	         0	         2	         5	        10	        20
                    -20	-0.00432000	-0.00079000	0.00123000	0.00041000	0.00000000	-0.00041000	-0.00123000	0.00079000	0.00432000
                     -2	0.00270000	0.00553000	0.00055000	-0.00025000	0.00000000	0.00025000	-0.00055000	-0.00553000	-0.00270000
                      8	0.03920000	0.00565000	-0.01305000	-0.01372000	0.00000000	0.01372000	0.01305000	-0.00565000	-0.03920000
                     18	0.04620000	-0.00394000	-0.00086000	-0.00195000	-0.00001000	0.00194000	0.00086000	0.00394000	-0.04620000
                     28	0.01288000	-0.00303000	-0.00241000	-0.00067000	0.00000000	0.00068000	0.00241000	0.00303000	-0.01288000
                     55	-0.00239000	-0.00583000	-0.00307000	-0.00036000	0.00000000	0.00036000	0.00307000	0.00583000	0.00247000
                     60	-0.00309000	-0.00787000	-0.00434000	-0.00082000	0.00000000	0.00082000	0.00434000	0.00787000	0.00309000
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              </tableData>
          </table>
    </function>
    <function name="aero/coefficients/CMNGEAR">
    <description>YAWING MOMENT INCREMENT DUE TO GEAR</description>
    <product>
          <property>gear/gear-pos-norm</property>
          <table>
            <independentVar lookup="row">aero/alpha-deg</independentVar>
            <independentVar lookup="column">aero/beta-deg</independentVar>
            <tableData>
                                -20	        -10	         -5	         -2	          0	          2	          5	         10	         20
                    -20	-0.00530000	-0.00477000	-0.00493000	-0.00205000	-0.00008000	0.00191000	0.00485000	0.00471000	0.00519000
                     -2	-0.00204000	-0.00356000	-0.00318000	-0.00123000	0.00000000	0.00121000	0.00318000	0.00358000	0.00204000
                      8	-0.00198000	0.00255000	-0.00124000	-0.00095000	0.00004000	0.00093000	0.00112000	-0.00263000	0.00193000
                     18	-0.00041000	-0.00657000	-0.01126000	-0.00713000	-0.00001000	0.00710000	0.01136000	0.00666000	0.00039000
                     28	0.02243000	-0.00138000	-0.00594000	-0.00402000	-0.00003000	0.00408000	0.00601000	0.00152000	-0.02269000
                     55	0.01181000	0.00404000	0.00351000	0.00146000	0.00015000	-0.00109000	-0.00332000	-0.00393000	-0.01161000
                     60	0.01313000	0.00484000	0.00331000	0.00152000	0.00021000	-0.00133000	-0.00310000	-0.00472000	-0.01306000
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            </tableData>
          </table>
       </product>
    </function>
    <function name="aero/coefficients/CMNMN">
    <description>YAWING MOMENT INCREMENT DUE TO MACH</description>
          <table>
            <independentVar lookup="row">velocities/mach</independentVar>
            <independentVar lookup="column">aero/alpha-deg</independentVar>
            <tableData>
                                -10	         -5	         -2	       0.01	          1	          2	          6	          7	         10
                    0.2	0.00000000	0.00000000	0.00000000	0.00000000	0.00000000	0.00000000	0.00000000	0.00000000	0.00000000
                    0.4	0.00000000	0.00000000	0.00000000	0.00000000	0.00000000	0.00000000	0.00000000	0.00000000	0.00000000
                    0.6	0.00000000	0.00000000	0.00000000	0.00000000	0.00000000	0.00000000	0.00000000	0.00000000	0.00000000
                    0.8	0.00000000	0.00000000	0.00000000	0.00000000	0.00000000	0.00000000	0.00000000	0.00000000	0.00000000
                    0.9	0.00000000	0.00000000	0.00000000	0.00000000	0.00000000	0.00000000	0.00000000	0.00000000	0.00000000
                   0.97	0.00000000	0.00000000	0.00000000	0.00000000	0.00000000	0.00000000	0.00000000	0.00000000	0.00000000
                   0.98	0.00000000	0.00000000	0.00000000	0.00000000	0.00000000	0.00000000	0.00000000	0.00000000	0.00000000
                   0.99	0.00000000	0.00000000	0.00000000	0.00000000	0.00000000	0.00000000	0.00000000	0.00000000	0.00000000
                    1.4	0.00044000	0.00016000	0.00001000	0.00001000	0.00002000	0.00002000	0.00027000	0.00021000	0.00054000
            </tableData>
          </table>
    </function>
    <function name="aero/coefficients/CMNP">
    <description>YAW MOMENT DUE TO ROLL RATE</description>
    <product>
          <property>aero/pb</property>
          <table>
            <independentVar lookup="row">aero/alpha-deg</independentVar>
            <tableData>
                    -20		0.11202100
                    -10		0.26043730
                      0		0.03338420
                     10		-0.15059820
                     20		-0.09366690
                     30		-0.06791440
                     60		-0.09837430
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            </tableData>
          </table>
       </product>
    </function>
    <function name="aero/coefficients/CMNR">
    <description>YAW DAMPING DERIVATIVE</description>
    <product>
          <property>aero/rb</property>
          <table>
            <independentVar lookup="row">aero/alpha-deg</independentVar>
            <tableData>
                    -20		-0.28391280
                    -10		-0.13842590
                      0		-0.15661670
                     10		-0.21278130
                     20		-0.26803810
                     30		-0.15377300
                     60		-0.01975370
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            </tableData>
          </table>
       </product>
    </function>
    <function name="aero/coefficients/CDRAG">
      <sum>
          <property>aero/coefficients/CFXB</property>
          <property>aero/coefficients/CFXDAD</property>
          <property>aero/coefficients/CFXDRD</property>
          <property>aero/coefficients/CFXGEAR</property>
          <property>aero/coefficients/CFXFLAPS</property>
          <property>aero/coefficients/CFXMN</property>
          <property>aero/coefficients/CFXDADMN</property>
          <property>aero/coefficients/CFXDRDMN</property>
       </sum>
    </function>
  <axis name="DRAG">
    <function name="aero/force/DRAG">
    <product>
          <property>aero/qbar-psf</property>
          <property>metrics/Sw-sqft</property>
          <property>aero/coefficients/CDRAG</property>
       </product>
    </function>
  </axis>
    <function name="aero/coefficients/CROLL">
      <sum>
          <property>aero/coefficients/CML1</property>
          <property>aero/coefficients/CMLDAD</property>
          <property>aero/coefficients/CMLDRD</property>
          <property>aero/coefficients/CMLGEAR</property>
          <property>aero/coefficients/CMLFLAPS</property>
          <property>aero/coefficients/CMLMN</property>
          <property>aero/coefficients/CMLDADMN</property>
          <property>aero/coefficients/CMLDRDMN</property>
          <property>aero/coefficients/CMLBETADOT</property>
          <property>aero/coefficients/CMLP</property>
          <property>aero/coefficients/CMLR</property>
       </sum>
    </function>
  <axis name="ROLL">
    <function name="aero/force/ROLL">
    <product>
          <property>aero/qbar-psf</property>
          <property>metrics/Sw-sqft</property>
          <property>metrics/bw-ft</property>
          <property>aero/coefficients/CROLL</property>
       </product>
    </function>
  </axis>
    <function name="aero/coefficients/CSIDE">
      <sum>
          <property>aero/coefficients/CYDAD</property>
          <property>aero/coefficients/CYDRD</property>
          <property>aero/coefficients/CFYGEAR</property>
          <property>aero/coefficients/CFYFLAPS</property>
          <property>aero/coefficients/CFYB</property>
          <property>aero/coefficients/CFYMN</property>
          <property>aero/coefficients/CYDADMN</property>
          <property>aero/coefficients/CYDRDMN</property>
          <property>aero/coefficients/CFYP</property>
          <property>aero/coefficients/CFYR</property>
       </sum>
    </function>
  <axis name="SIDE">
    <function name="aero/force/SIDE">
    <product>
          <property>aero/qbar-psf</property>
          <property>metrics/Sw-sqft</property>
          <property>aero/coefficients/CSIDE</property>
       </product>
    </function>
  </axis>
    <function name="aero/coefficients/CLIFT">
      <sum>
          <property>aero/coefficients/CFZDAD</property>
          <property>aero/coefficients/CFZDRD</property>
          <property>aero/coefficients/CFZGEAR</property>
          <property>aero/coefficients/CFZFLAPS</property>
          <property>aero/coefficients/CFZB</property>
          <property>aero/coefficients/CFZMN</property>
          <property>aero/coefficients/CFZDADMN</property>
          <property>aero/coefficients/CFZDRDMN</property>
       </sum>
    </function>
  <axis name="LIFT">
    <function name="aero/force/LIFT">
    <product>
          <property>aero/qbar-psf</property>
          <property>metrics/Sw-sqft</property>
          <property>aero/coefficients/CLIFT</property>
       </product>
    </function>
  </axis>
    <function name="aero/coefficients/CPITCH">
      <sum>
          <property>aero/coefficients/CMMDAD</property>
          <property>aero/coefficients/CMMDRD</property>
          <property>aero/coefficients/CMMGEAR</property>
          <property>aero/coefficients/CMMFLAPS</property>
          <property>aero/coefficients/CMM1</property>
          <property>aero/coefficients/CMMMN</property>
          <property>aero/coefficients/CMMDADMN</property>
          <property>aero/coefficients/CMMDRDMN</property>
          <property>aero/coefficients/CMMALPHADOT</property>
          <property>aero/coefficients/CMMQ</property>
       </sum>
    </function>
  <axis name="PITCH">
    <function name="aero/force/PITCH">
    <product>
          <property>aero/qbar-psf</property>
          <property>metrics/Sw-sqft</property>
          <property>metrics/cbarw-ft</property>
          <property>aero/coefficients/CPITCH</property>
       </product>
    </function>
  </axis>
    <function name="aero/coefficients/CYAW">
      <sum>
          <property>aero/coefficients/CMNDAD</property>
          <property>aero/coefficients/CMNDRD</property>
          <property>aero/coefficients/CMNGEAR</property>
          <property>aero/coefficients/CMNFLAPS</property>
          <property>aero/coefficients/CMN1</property>
          <property>aero/coefficients/CMNMN</property>
          <property>aero/coefficients/CMNDADMN</property>
          <property>aero/coefficients/CMNDRDMN</property>
          <property>aero/coefficients/CMNBETADOT</property>
          <property>aero/coefficients/CMNR</property>
          <property>aero/coefficients/CMNP</property>
       </sum>
    </function>
  <axis name="YAW">
    <function name="aero/force/YAW">
    <product>
          <property>aero/qbar-psf</property>
          <property>metrics/Sw-sqft</property>
          <property>metrics/bw-ft</property>
          <property>aero/coefficients/CYAW</property>
       </product>
    </function>
  </axis>
</aerodynamics>
    <output name="c:/temp/JSBOut.csv" type="CSV" rate="10">
        <property caption="alpha-deg">aero/alpha-deg</property>
        <property caption="alphadot-rad_sec-limited">aero/alphadot-rad_sec-limited</property>
        <property caption="beta-deg">aero/beta-deg</property>
        <property caption="betadot-rad_sec-limited">aero/betadot-rad_sec-limited</property>
        <property caption="CDRAG">aero/coefficients/CDRAG</property>
        <property caption="CFXB">aero/coefficients/CFXB</property>
        <property caption="CFXDAD">aero/coefficients/CFXDAD</property>
        <property caption="CFXDADMN">aero/coefficients/CFXDADMN</property>
        <property caption="CFXDRD">aero/coefficients/CFXDRD</property>
        <property caption="CFXDRDMN">aero/coefficients/CFXDRDMN</property>
        <property caption="CFXFLAPS">aero/coefficients/CFXFLAPS</property>
        <property caption="CFXGEAR">aero/coefficients/CFXGEAR</property>
        <property caption="CFXMN">aero/coefficients/CFXMN</property>
        <property caption="CFYB">aero/coefficients/CFYB</property>
        <property caption="CFYFLAPS">aero/coefficients/CFYFLAPS</property>
        <property caption="CFYGEAR">aero/coefficients/CFYGEAR</property>
        <property caption="CFYMN">aero/coefficients/CFYMN</property>
        <property caption="CFYP">aero/coefficients/CFYP</property>
        <property caption="CFYR">aero/coefficients/CFYR</property>
        <property caption="CFZB">aero/coefficients/CFZB</property>
        <property caption="CFZDAD">aero/coefficients/CFZDAD</property>
        <property caption="CFZDADMN">aero/coefficients/CFZDADMN</property>
        <property caption="CFZDRD">aero/coefficients/CFZDRD</property>
        <property caption="CFZDRDMN">aero/coefficients/CFZDRDMN</property>
        <property caption="CFZFLAPS">aero/coefficients/CFZFLAPS</property>
        <property caption="CFZGEAR">aero/coefficients/CFZGEAR</property>
        <property caption="CFZMN">aero/coefficients/CFZMN</property>
        <property caption="CLIFT">aero/coefficients/CLIFT</property>
        <property caption="CML1">aero/coefficients/CML1</property>
        <property caption="CMLBETADOT">aero/coefficients/CMLBETADOT</property>
        <property caption="CMLDAD">aero/coefficients/CMLDAD</property>
        <property caption="CMLDADMN">aero/coefficients/CMLDADMN</property>
        <property caption="CMLDRD">aero/coefficients/CMLDRD</property>
        <property caption="CMLDRDMN">aero/coefficients/CMLDRDMN</property>
        <property caption="CMLFLAPS">aero/coefficients/CMLFLAPS</property>
        <property caption="CMLGEAR">aero/coefficients/CMLGEAR</property>
        <property caption="CMLMN">aero/coefficients/CMLMN</property>
        <property caption="CMLP">aero/coefficients/CMLP</property>
        <property caption="CMLR">aero/coefficients/CMLR</property>
        <property caption="CMM1">aero/coefficients/CMM1</property>
        <property caption="CMMALPHADOT">aero/coefficients/CMMALPHADOT</property>
        <property caption="CMMDAD">aero/coefficients/CMMDAD</property>
        <property caption="CMMDADMN">aero/coefficients/CMMDADMN</property>
        <property caption="CMMDRD">aero/coefficients/CMMDRD</property>
        <property caption="CMMDRDMN">aero/coefficients/CMMDRDMN</property>
        <property caption="CMMFLAPS">aero/coefficients/CMMFLAPS</property>
        <property caption="CMMGEAR">aero/coefficients/CMMGEAR</property>
        <property caption="CMMMN">aero/coefficients/CMMMN</property>
        <property caption="CMMQ">aero/coefficients/CMMQ</property>
        <property caption="CMN1">aero/coefficients/CMN1</property>
        <property caption="CMNBETADOT">aero/coefficients/CMNBETADOT</property>
        <property caption="CMNDAD">aero/coefficients/CMNDAD</property>
        <property caption="CMNDADMN">aero/coefficients/CMNDADMN</property>
        <property caption="CMNDRD">aero/coefficients/CMNDRD</property>
        <property caption="CMNDRDMN">aero/coefficients/CMNDRDMN</property>
        <property caption="CMNFLAPS">aero/coefficients/CMNFLAPS</property>
        <property caption="CMNGEAR">aero/coefficients/CMNGEAR</property>
        <property caption="CMNMN">aero/coefficients/CMNMN</property>
        <property caption="CMNP">aero/coefficients/CMNP</property>
        <property caption="CMNR">aero/coefficients/CMNR</property>
        <property caption="CPITCH">aero/coefficients/CPITCH</property>
        <property caption="CROLL">aero/coefficients/CROLL</property>
        <property caption="CSIDE">aero/coefficients/CSIDE</property>
        <property caption="CYAW">aero/coefficients/CYAW</property>
        <property caption="CYDAD">aero/coefficients/CYDAD</property>
        <property caption="CYDADMN">aero/coefficients/CYDADMN</property>
        <property caption="CYDRD">aero/coefficients/CYDRD</property>
        <property caption="CYDRDMN">aero/coefficients/CYDRDMN</property>
        <property caption="pb">aero/pb</property>
        <property caption="qb">aero/qb</property>
        <property caption="qbar-psf">aero/qbar-psf</property>
        <property caption="rb">aero/rb</property>
        <property caption="phi-deg">attitude/phi-deg</property>
        <property caption="psi-deg">attitude/psi-deg</property>
        <property caption="theta-deg">attitude/theta-deg</property>
        <property caption="aileron-pos-deg">fcs/aileron-pos-deg</property>
        <property caption="elevator-pos-deg">fcs/elevator-pos-deg</property>
        <property caption="flap-pos-deg">fcs/flap-pos-deg</property>
        <property caption="rudder-pos-deg">fcs/rudder-pos-deg</property>
        <property caption="fbx-total-lbs">forces/fbx-total-lbs</property>
        <property caption="fby-total-lbs">forces/fby-total-lbs</property>
        <property caption="fbz-total-lbs">forces/fbz-total-lbs</property>
        <property caption="gear-pos-norm">gear/gear-pos-norm</property>
        <property caption="l-total-lbsft">moments/l-total-lbsft</property>
        <property caption="m-total-lbsft">moments/m-total-lbsft</property>
        <property caption="n-total-lbsft">moments/n-total-lbsft</property>
        <property caption="mach">velocities/mach</property>
        <property caption="p-aero-rad_sec">velocities/p-aero-rad_sec</property>
        <property caption="q-aero-rad_sec">velocities/q-aero-rad_sec</property>
        <property caption="r-aero-rad_sec">velocities/r-aero-rad_sec</property>
        <property caption="vt-fps">velocities/vt-fps</property>
    </output>
</fdm_config>
